<?xml version='1.0' encoding='UTF-8'?>
<Lems>

  <!-- ivy cell -->

    <Target component="sim1"/>

    <Include file="Cells.xml"/>
    <Include file="Networks.xml"/>
    <Include file="Simulation.xml"/>

    <Include file="ivy.net.nml"/>
    <Include file="ivy.cell.nml"/>

    <Include file="../channels/CavL.channel.nml"/>
    <Include file="../channels/CavN.channel.nml"/>
    <Include file="../channels/KCaS.channel.nml"/>
    <Include file="../channels/Kdrfastngf.channel.nml"/>
    <Include file="../channels/KvAngf.channel.nml"/>
    <Include file="../channels/KvCaB.channel.nml"/>
    <Include file="../channels/Navngf.channel.nml"/>
    <Include file="../channels/leak_chan.channel.nml"/>
    <Include file="../channels/Capool.nml"/>

<!-- Simulation specifications -->

    <Simulation id="sim1" length="300ms" step="0.001ms" target="network">

        <Display id="d1" title="ivy cell with 0.5nA input" timeScale="1ms" xmin="-10" xmax="310" ymin="-85" ymax="55">
            <Line id="ivy V(mV)" quantity="Pop_ivycell/0/ivycell/v" scale="1mV" color="#0000FF" timeScale="1ms"/>
        </Display>

        <OutputFile id="of0" fileName="ivy.dat">
            <OutputColumn id="v" quantity="Pop_ivycell/0/ivycell/v"/>
            <OutputColumn id="cai" quantity="Pop_ivycell/0/ivycell/caConc"/>
        </OutputFile>

    </Simulation>

</Lems>
