<?xml version='1.0' encoding='UTF-8'?>
<Lems>

  <!-- ngf cell -->

    <Target component="sim1"/>

    <Include file="Cells.xml"/>
    <Include file="Networks.xml"/>
    <Include file="Simulation.xml"/>

    <Include file="ngf.net.nml"/>
    <Include file="ngf.cell.nml"/>

    <Include file="../channels/CavL.channel.nml"/>
    <Include file="../channels/CavN.channel.nml"/>
    <Include file="../channels/KCaS.channel.nml"/>
    <Include file="../channels/Kdrfastngf.channel.nml"/>
    <Include file="../channels/KvAngf.channel.nml"/>
    <Include file="../channels/KvCaB.channel.nml"/>
    <Include file="../channels/Navngf.channel.nml"/>
    <Include file="../channels/leak_chan.channel.nml"/>
    <Include file="../channels/Capool.nml"/>

<!-- Simulation specifications -->

    <Simulation id="sim1" length="300ms" step="0.001ms" target="network">

        <Display id="d1" title="ngf cell with 0.5nA input" timeScale="1ms" xmin="-10" xmax="310" ymin="-85" ymax="55">
            <Line id="ngf V(mV)" quantity="Pop_ngfcell/0/ngfcell/v" scale="1mV" color="#0000FF" timeScale="1ms"/>
        </Display>

        <OutputFile id="of0" fileName="ngf.dat">
            <OutputColumn id="v" quantity="Pop_ngfcell/0/ngfcell/v"/>
            <OutputColumn id="cai" quantity="Pop_ngfcell/0/ngfcell/caConc"/>
        </OutputFile>

    </Simulation>

</Lems>
