<?xml version='1.0' encoding='UTF-8'?>
<Lems>

  <!-- olm cell -->

    <Target component="sim1"/>

    <Include file="Cells.xml"/>
    <Include file="Networks.xml"/>
    <Include file="Simulation.xml"/>

    <Include file="olm.net.nml"/>
    <Include file="olm.cell.nml"/>

    <Include file="../channels/HCNolm.channel.nml"/>
    <Include file="../channels/Kdrfast.channel.nml"/>
    <Include file="../channels/KvAolm.channel.nml"/>
    <Include file="../channels/Nav.channel.nml"/>
    <Include file="../channels/leak_chan.channel.nml"/>

<!-- Simulation specifications -->

    <Simulation id="sim1" length="300ms" step="0.001ms" target="network">

        <Display id="d1" title="olm cell with 0.5nA input" timeScale="1ms" xmin="-10" xmax="310" ymin="-85" ymax="55">
            <Line id="olm V(mV)" quantity="Pop_olmcell/0/olmcell/v" scale="1mV" color="#0000FF" timeScale="1ms"/>
        </Display>

        <OutputFile id="of0" fileName="olm.dat">
            <OutputColumn id="v" quantity="Pop_olmcell/0/olmcell/v"/>
        </OutputFile>

    </Simulation>

</Lems>
