<?xml version='1.0' encoding='UTF-8'?>
<Lems>

  <!-- poolosyn cell -->

    <Target component="sim1"/>

    <Include file="Cells.xml"/>
    <Include file="Networks.xml"/>
    <Include file="Simulation.xml"/>

    <Include file="poolosyn_orig_unrotated.net.nml"/>
    <Include file="poolosyn_orig_unrotated.cell.nml"/>

    <Include file="../channels/HCNp.channel.nml"/>
    <Include file="../channels/Kdrp.channel.nml"/>
    <Include file="../channels/KvAproxp.channel.nml"/>
    <Include file="../channels/KvAdistp.channel.nml"/>
    <Include file="../channels/Navp.channel.nml"/>
    <Include file="../channels/Navaxonp.channel.nml"/>
    <Include file="../channels/leak_chan.channel.nml"/>

<!-- Simulation specifications -->

    <Simulation id="sim1" length="300ms" step="0.001ms" target="network">

        <Display id="d1" title="poolosyn cell with 0.5nA input" timeScale="1ms" xmin="-10" xmax="310" ymin="-85" ymax="55">
            <Line id="poolosyn V(mV)" quantity="Pop_poolosyncell/0/poolosyncell/v" scale="1mV" color="#0000FF" timeScale="1ms"/>
        </Display>

        <OutputFile id="of0" fileName="poolosyn.dat">
            <OutputColumn id="v" quantity="Pop_poolosyncell/0/poolosyncell/v"/>
        </OutputFile>

    </Simulation>

</Lems>
