<Lems>

    <!--

        This LEMS file has been automatically generated using PyNeuroML v0.1.10 (libNeuroML v0.2.13)

     -->

    <!-- Specify which component to run -->
    <Target component="Sim_HippocampalNet"/>

    <!-- Include core NeuroML2 ComponentType definitions -->
    <Include file="Cells.xml"/>
    <Include file="Networks.xml"/>
    <Include file="Simulation.xml"/>

    <Include file="../channels/CavL.channel.nml"/>
    <Include file="../channels/CavN.channel.nml"/>
    <Include file="../channels/HCN.channel.nml"/>
    <Include file="../channels/HCNolm.channel.nml"/>
    <Include file="../channels/HCNp.channel.nml"/>
    <Include file="../channels/KCaS.channel.nml"/>
    <Include file="../channels/Kdrfast.channel.nml"/>
    <Include file="../channels/Kdrfastngf.channel.nml"/>
    <Include file="../channels/Kdrp.channel.nml"/>
    <Include file="../channels/Kdrslow.channel.nml"/>
    <Include file="../channels/KvA.channel.nml"/>
    <Include file="../channels/KvAdistp.channel.nml"/>
    <Include file="../channels/KvAngf.channel.nml"/>
    <Include file="../channels/KvAolm.channel.nml"/>
    <Include file="../channels/KvAproxp.channel.nml"/>
    <Include file="../channels/KvCaB.channel.nml"/>
    <Include file="../channels/KvGroup.channel.nml"/>
    <Include file="../channels/Nav.channel.nml"/>
    <Include file="../channels/Navaxonp.channel.nml"/>
    <Include file="../channels/Navbis.channel.nml"/>
    <Include file="../channels/Navcck.channel.nml"/>
    <Include file="../channels/Navngf.channel.nml"/>
    <Include file="../channels/Navp.channel.nml"/>
    <Include file="../channels/leak_chan.channel.nml"/>
    <Include file="../channels/Capool.nml"/>
    <Include file="../cells/axoaxonic.cell.nml"/>
    <Include file="../cells/bistratified.cell.nml"/>
    <Include file="../cells/cck.cell.nml"/>
    <Include file="../cells/cutsuridis.cell.nml"/>
    <Include file="../cells/ivy.cell.nml"/>
    <Include file="../cells/ngf.cell.nml"/>
    <Include file="../cells/olm.cell.nml"/>
    <Include file="../cells/poolosyn.cell.nml"/>
    <Include file="../cells/pvbasket.cell.nml"/>
    <Include file="../cells/sca.cell.nml"/>
    <Include file="../synapses/exp2Synapses.synapse.nml"/>
    <Include file="../synapses/customGABASynapses.synapse.nml"/>
    <Include file="stimulations.nml"/>
    <Include file="Mod_HippocampalNet.net.nml"/>

    <Simulation id="Sim_HippocampalNet" length="100ms" step="0.01ms" target="HippocampalNet" seed="12345">  <!-- Note seed: ensures same random numbers used every run -->

        <Display id="disp_PC" title="Voltages Pyramidal cells" timeScale="1ms" xmin="-10.0" xmax="110.0" ymin="-80" ymax="50">
            <Line id="PC 0: V[mV]" quantity="pop_poolosyn/0/poolosyncell/v" scale="1mV" color="#f5ec9f" timeScale="1ms"/>
            <Line id="PC 1: V[mV]" quantity="pop_poolosyn/1/poolosyncell/v" scale="1mV" color="#4a8c49" timeScale="1ms"/>
            <Line id="PC 2: V[mV]" quantity="pop_poolosyn/2/poolosyncell/v" scale="1mV" color="#080118" timeScale="1ms"/>
            <Line id="PC 3: V[mV]" quantity="pop_poolosyn/3/poolosyncell/v" scale="1mV" color="#da072b" timeScale="1ms"/>
            <Line id="PC 4: V[mV]" quantity="pop_poolosyn/4/poolosyncell/v" scale="1mV" color="#94df39" timeScale="1ms"/>
            <Line id="PC 5: V[mV]" quantity="pop_poolosyn/5/poolosyncell/v" scale="1mV" color="#d50467" timeScale="1ms"/>
            <Line id="PC 6: V[mV]" quantity="pop_poolosyn/6/poolosyncell/v" scale="1mV" color="#75b6fe" timeScale="1ms"/>
            <Line id="PC 7: V[mV]" quantity="pop_poolosyn/7/poolosyncell/v" scale="1mV" color="#36927e" timeScale="1ms"/>
            <Line id="PC 8: V[mV]" quantity="pop_poolosyn/8/poolosyncell/v" scale="1mV" color="#b18d1e" timeScale="1ms"/>
        </Display>

        <OutputFile id="of_ngf" fileName="ngf.v.dat">
            <OutputColumn id="v_0" quantity="pop_ngf/0/ngfcell/v"/>
        </OutputFile>

        <OutputFile id="of_bistratified" fileName="bistratified.v.dat">
            <OutputColumn id="v_0" quantity="pop_bistratified/0/bistratifiedcell/v"/>
        </OutputFile>

        <OutputFile id="of_sca" fileName="sca.v.dat">
            <OutputColumn id="v_0" quantity="pop_sca/0/scacell/v"/>
        </OutputFile>

        <OutputFile id="of_olm" fileName="olm.v.dat">
            <OutputColumn id="v_0" quantity="pop_olm/0/olmcell/v"/>
        </OutputFile>

        <OutputFile id="of_ivy" fileName="ivy.v.dat">
            <OutputColumn id="v_0" quantity="pop_ivy/0/ivycell/v"/>
        </OutputFile>

        <OutputFile id="of_pvbasket" fileName="pvbasket.v.dat">
            <OutputColumn id="v_0" quantity="pop_pvbasket/0/pvbasketcell/v"/>
        </OutputFile>

        <OutputFile id="of_cck" fileName="cck.v.dat">
            <OutputColumn id="v_0" quantity="pop_cck/0/cckcell/v"/>
        </OutputFile>

        <OutputFile id="of_axoaxonic" fileName="axoaxonic.v.dat">
            <OutputColumn id="v_0" quantity="pop_axoaxonic/0/axoaxoniccell/v"/>
        </OutputFile>

        <OutputFile id="of_poolosyn" fileName="poolosyn.v.dat">
            <OutputColumn id="v_0" quantity="pop_poolosyn/0/poolosyncell/v"/>
            <OutputColumn id="v_1" quantity="pop_poolosyn/1/poolosyncell/v"/>
            <OutputColumn id="v_2" quantity="pop_poolosyn/2/poolosyncell/v"/>
            <OutputColumn id="v_3" quantity="pop_poolosyn/3/poolosyncell/v"/>
            <OutputColumn id="v_4" quantity="pop_poolosyn/4/poolosyncell/v"/>
            <OutputColumn id="v_5" quantity="pop_poolosyn/5/poolosyncell/v"/>
            <OutputColumn id="v_6" quantity="pop_poolosyn/6/poolosyncell/v"/>
            <OutputColumn id="v_7" quantity="pop_poolosyn/7/poolosyncell/v"/>
            <OutputColumn id="v_8" quantity="pop_poolosyn/8/poolosyncell/v"/>
            <OutputColumn id="v_9" quantity="pop_poolosyn/9/poolosyncell/v"/>
            <OutputColumn id="v_10" quantity="pop_poolosyn/10/poolosyncell/v"/>
            <OutputColumn id="v_11" quantity="pop_poolosyn/11/poolosyncell/v"/>
            <OutputColumn id="v_12" quantity="pop_poolosyn/12/poolosyncell/v"/>
            <OutputColumn id="v_13" quantity="pop_poolosyn/13/poolosyncell/v"/>
            <OutputColumn id="v_14" quantity="pop_poolosyn/14/poolosyncell/v"/>
            <OutputColumn id="v_15" quantity="pop_poolosyn/15/poolosyncell/v"/>
            <OutputColumn id="v_16" quantity="pop_poolosyn/16/poolosyncell/v"/>
            <OutputColumn id="v_17" quantity="pop_poolosyn/17/poolosyncell/v"/>
            <OutputColumn id="v_18" quantity="pop_poolosyn/18/poolosyncell/v"/>
            <OutputColumn id="v_19" quantity="pop_poolosyn/19/poolosyncell/v"/>
            <OutputColumn id="v_20" quantity="pop_poolosyn/20/poolosyncell/v"/>
            <OutputColumn id="v_21" quantity="pop_poolosyn/21/poolosyncell/v"/>
            <OutputColumn id="v_22" quantity="pop_poolosyn/22/poolosyncell/v"/>
            <OutputColumn id="v_23" quantity="pop_poolosyn/23/poolosyncell/v"/>
            <OutputColumn id="v_24" quantity="pop_poolosyn/24/poolosyncell/v"/>
            <OutputColumn id="v_25" quantity="pop_poolosyn/25/poolosyncell/v"/>
            <OutputColumn id="v_26" quantity="pop_poolosyn/26/poolosyncell/v"/>
            <OutputColumn id="v_27" quantity="pop_poolosyn/27/poolosyncell/v"/>
            <OutputColumn id="v_28" quantity="pop_poolosyn/28/poolosyncell/v"/>
            <OutputColumn id="v_29" quantity="pop_poolosyn/29/poolosyncell/v"/>
            <OutputColumn id="v_30" quantity="pop_poolosyn/30/poolosyncell/v"/>
        </OutputFile>

        <EventOutputFile id="spikes_PC" fileName="PC.spikes.dat" format="ID_TIME">
            <EventSelection id="0" select="pop_poolosyn/0/poolosyncell" eventPort="spike"/>
            <EventSelection id="1" select="pop_poolosyn/1/poolosyncell" eventPort="spike"/>
            <EventSelection id="2" select="pop_poolosyn/2/poolosyncell" eventPort="spike"/>
            <EventSelection id="3" select="pop_poolosyn/3/poolosyncell" eventPort="spike"/>
            <EventSelection id="4" select="pop_poolosyn/4/poolosyncell" eventPort="spike"/>
            <EventSelection id="5" select="pop_poolosyn/5/poolosyncell" eventPort="spike"/>
            <EventSelection id="6" select="pop_poolosyn/6/poolosyncell" eventPort="spike"/>
            <EventSelection id="7" select="pop_poolosyn/7/poolosyncell" eventPort="spike"/>
            <EventSelection id="8" select="pop_poolosyn/8/poolosyncell" eventPort="spike"/>
            <EventSelection id="9" select="pop_poolosyn/9/poolosyncell" eventPort="spike"/>
            <EventSelection id="10" select="pop_poolosyn/10/poolosyncell" eventPort="spike"/>
            <EventSelection id="11" select="pop_poolosyn/11/poolosyncell" eventPort="spike"/>
            <EventSelection id="12" select="pop_poolosyn/12/poolosyncell" eventPort="spike"/>
            <EventSelection id="13" select="pop_poolosyn/13/poolosyncell" eventPort="spike"/>
            <EventSelection id="14" select="pop_poolosyn/14/poolosyncell" eventPort="spike"/>
            <EventSelection id="15" select="pop_poolosyn/15/poolosyncell" eventPort="spike"/>
            <EventSelection id="16" select="pop_poolosyn/16/poolosyncell" eventPort="spike"/>
            <EventSelection id="17" select="pop_poolosyn/17/poolosyncell" eventPort="spike"/>
            <EventSelection id="18" select="pop_poolosyn/18/poolosyncell" eventPort="spike"/>
            <EventSelection id="19" select="pop_poolosyn/19/poolosyncell" eventPort="spike"/>
            <EventSelection id="20" select="pop_poolosyn/20/poolosyncell" eventPort="spike"/>
            <EventSelection id="21" select="pop_poolosyn/21/poolosyncell" eventPort="spike"/>
            <EventSelection id="22" select="pop_poolosyn/22/poolosyncell" eventPort="spike"/>
            <EventSelection id="23" select="pop_poolosyn/23/poolosyncell" eventPort="spike"/>
            <EventSelection id="24" select="pop_poolosyn/24/poolosyncell" eventPort="spike"/>
            <EventSelection id="25" select="pop_poolosyn/25/poolosyncell" eventPort="spike"/>
            <EventSelection id="26" select="pop_poolosyn/26/poolosyncell" eventPort="spike"/>
            <EventSelection id="27" select="pop_poolosyn/27/poolosyncell" eventPort="spike"/>
            <EventSelection id="28" select="pop_poolosyn/28/poolosyncell" eventPort="spike"/>
            <EventSelection id="29" select="pop_poolosyn/29/poolosyncell" eventPort="spike"/>
            <EventSelection id="30" select="pop_poolosyn/30/poolosyncell" eventPort="spike"/>
        </EventOutputFile>

    </Simulation>

</Lems>
