<Lems>

    <!--

        This LEMS file has been automatically generated using PyNeuroML v0.2.8 (libNeuroML v0.2.28)

     -->

    <!-- Specify which component to run -->
    <Target component="Sim_HippocampalNet"/>

    <!-- Include core NeuroML2 ComponentType definitions -->
    <Include file="Cells.xml"/>
    <Include file="Networks.xml"/>
    <Include file="Simulation.xml"/>

    <Include file="HippocampalNet.net.nml"/>

    <Simulation id="Sim_HippocampalNet" length="100ms" step="0.025ms" target="HippocampalNet" seed="12345">  <!-- Note seed: ensures same random numbers used every run -->

        <Display id="DispPop__pop_ngf" title="Membrane potentials of cells in pop_ngf" timeScale="1ms" xmin="-10.0" xmax="110.0" ymin="-90" ymax="50">
            <Line id="pop_ngf[0]: v" quantity="pop_ngf/0/ngfcell/v" scale="1mV" color="#dca078" timeScale="1ms"/>
        </Display>

        <Display id="DispPop__pop_bistratified" title="Membrane potentials of cells in pop_bistratified" timeScale="1ms" xmin="-10.0" xmax="110.0" ymin="-90" ymax="50">
            <Line id="pop_bistratified[0]: v" quantity="pop_bistratified/0/bistratifiedcell/v" scale="1mV" color="#74067c" timeScale="1ms"/>
        </Display>

        <Display id="DispPop__pop_sca" title="Membrane potentials of cells in pop_sca" timeScale="1ms" xmin="-10.0" xmax="110.0" ymin="-90" ymax="50">
            <Line id="pop_sca[0]: v" quantity="pop_sca/0/scacell/v" scale="1mV" color="#392995" timeScale="1ms"/>
        </Display>

        <Display id="DispPop__pop_olm" title="Membrane potentials of cells in pop_olm" timeScale="1ms" xmin="-10.0" xmax="110.0" ymin="-90" ymax="50">
            <Line id="pop_olm[0]: v" quantity="pop_olm/0/olmcell/v" scale="1mV" color="#a65552" timeScale="1ms"/>
        </Display>

        <Display id="DispPop__pop_poolosyn" title="Membrane potentials of cells in pop_poolosyn" timeScale="1ms" xmin="-10.0" xmax="110.0" ymin="-90" ymax="50">
            <Line id="pop_poolosyn[0]: v" quantity="pop_poolosyn/0/poolosyncell/v" scale="1mV" color="#75e2e4" timeScale="1ms"/>
            <Line id="pop_poolosyn[1]: v" quantity="pop_poolosyn/1/poolosyncell/v" scale="1mV" color="#7e73c4" timeScale="1ms"/>
            <Line id="pop_poolosyn[2]: v" quantity="pop_poolosyn/2/poolosyncell/v" scale="1mV" color="#0086e3" timeScale="1ms"/>
            <Line id="pop_poolosyn[3]: v" quantity="pop_poolosyn/3/poolosyncell/v" scale="1mV" color="#d0700d" timeScale="1ms"/>
            <Line id="pop_poolosyn[4]: v" quantity="pop_poolosyn/4/poolosyncell/v" scale="1mV" color="#968437" timeScale="1ms"/>
            <Line id="pop_poolosyn[5]: v" quantity="pop_poolosyn/5/poolosyncell/v" scale="1mV" color="#ab21cb" timeScale="1ms"/>
            <Line id="pop_poolosyn[6]: v" quantity="pop_poolosyn/6/poolosyncell/v" scale="1mV" color="#c90506" timeScale="1ms"/>
            <Line id="pop_poolosyn[7]: v" quantity="pop_poolosyn/7/poolosyncell/v" scale="1mV" color="#69fa70" timeScale="1ms"/>
            <Line id="pop_poolosyn[8]: v" quantity="pop_poolosyn/8/poolosyncell/v" scale="1mV" color="#94d047" timeScale="1ms"/>
            <Line id="pop_poolosyn[9]: v" quantity="pop_poolosyn/9/poolosyncell/v" scale="1mV" color="#d7088d" timeScale="1ms"/>
            <Line id="pop_poolosyn[10]: v" quantity="pop_poolosyn/10/poolosyncell/v" scale="1mV" color="#aedb9a" timeScale="1ms"/>
            <Line id="pop_poolosyn[11]: v" quantity="pop_poolosyn/11/poolosyncell/v" scale="1mV" color="#2cf333" timeScale="1ms"/>
            <Line id="pop_poolosyn[12]: v" quantity="pop_poolosyn/12/poolosyncell/v" scale="1mV" color="#eeabd1" timeScale="1ms"/>
            <Line id="pop_poolosyn[13]: v" quantity="pop_poolosyn/13/poolosyncell/v" scale="1mV" color="#6bc051" timeScale="1ms"/>
            <Line id="pop_poolosyn[14]: v" quantity="pop_poolosyn/14/poolosyncell/v" scale="1mV" color="#07be8b" timeScale="1ms"/>
            <Line id="pop_poolosyn[15]: v" quantity="pop_poolosyn/15/poolosyncell/v" scale="1mV" color="#843084" timeScale="1ms"/>
            <Line id="pop_poolosyn[16]: v" quantity="pop_poolosyn/16/poolosyncell/v" scale="1mV" color="#4d82fe" timeScale="1ms"/>
            <Line id="pop_poolosyn[17]: v" quantity="pop_poolosyn/17/poolosyncell/v" scale="1mV" color="#669e79" timeScale="1ms"/>
            <Line id="pop_poolosyn[18]: v" quantity="pop_poolosyn/18/poolosyncell/v" scale="1mV" color="#85003c" timeScale="1ms"/>
            <Line id="pop_poolosyn[19]: v" quantity="pop_poolosyn/19/poolosyncell/v" scale="1mV" color="#5d2b97" timeScale="1ms"/>
            <Line id="pop_poolosyn[20]: v" quantity="pop_poolosyn/20/poolosyncell/v" scale="1mV" color="#79caf1" timeScale="1ms"/>
            <Line id="pop_poolosyn[21]: v" quantity="pop_poolosyn/21/poolosyncell/v" scale="1mV" color="#92a90f" timeScale="1ms"/>
            <Line id="pop_poolosyn[22]: v" quantity="pop_poolosyn/22/poolosyncell/v" scale="1mV" color="#caae04" timeScale="1ms"/>
            <Line id="pop_poolosyn[23]: v" quantity="pop_poolosyn/23/poolosyncell/v" scale="1mV" color="#c39348" timeScale="1ms"/>
            <Line id="pop_poolosyn[24]: v" quantity="pop_poolosyn/24/poolosyncell/v" scale="1mV" color="#4383b2" timeScale="1ms"/>
            <Line id="pop_poolosyn[25]: v" quantity="pop_poolosyn/25/poolosyncell/v" scale="1mV" color="#2fe00a" timeScale="1ms"/>
            <Line id="pop_poolosyn[26]: v" quantity="pop_poolosyn/26/poolosyncell/v" scale="1mV" color="#601f8b" timeScale="1ms"/>
            <Line id="pop_poolosyn[27]: v" quantity="pop_poolosyn/27/poolosyncell/v" scale="1mV" color="#ee88e9" timeScale="1ms"/>
            <Line id="pop_poolosyn[28]: v" quantity="pop_poolosyn/28/poolosyncell/v" scale="1mV" color="#272641" timeScale="1ms"/>
            <Line id="pop_poolosyn[29]: v" quantity="pop_poolosyn/29/poolosyncell/v" scale="1mV" color="#a0ac3c" timeScale="1ms"/>
            <Line id="pop_poolosyn[30]: v" quantity="pop_poolosyn/30/poolosyncell/v" scale="1mV" color="#486e48" timeScale="1ms"/>
        </Display>

        <Display id="DispPop__pop_pvbasket" title="Membrane potentials of cells in pop_pvbasket" timeScale="1ms" xmin="-10.0" xmax="110.0" ymin="-90" ymax="50">
            <Line id="pop_pvbasket[0]: v" quantity="pop_pvbasket/0/pvbasketcell/v" scale="1mV" color="#8f832c" timeScale="1ms"/>
        </Display>

        <Display id="DispPop__pop_cck" title="Membrane potentials of cells in pop_cck" timeScale="1ms" xmin="-10.0" xmax="110.0" ymin="-90" ymax="50">
            <Line id="pop_cck[0]: v" quantity="pop_cck/0/cckcell/v" scale="1mV" color="#f73dae" timeScale="1ms"/>
        </Display>

        <Display id="DispPop__pop_axoaxonic" title="Membrane potentials of cells in pop_axoaxonic" timeScale="1ms" xmin="-10.0" xmax="110.0" ymin="-90" ymax="50">
            <Line id="pop_axoaxonic[0]: v" quantity="pop_axoaxonic/0/axoaxoniccell/v" scale="1mV" color="#8a3f67" timeScale="1ms"/>
        </Display>

        <Display id="DispPop__pop_ivy" title="Membrane potentials of cells in pop_ivy" timeScale="1ms" xmin="-10.0" xmax="110.0" ymin="-90" ymax="50">
            <Line id="pop_ivy[0]: v" quantity="pop_ivy/0/ivycell/v" scale="1mV" color="#1626e7" timeScale="1ms"/>
        </Display>

        <OutputFile id="Volts_file__pop_ngf" fileName="Sim_HippocampalNet.pop_ngf.v.dat">
            <OutputColumn id="v_pop_ngf_0_ngfcell_v" quantity="pop_ngf/0/ngfcell/v"/>
        </OutputFile>

        <OutputFile id="Volts_file__pop_bistratified" fileName="Sim_HippocampalNet.pop_bistratified.v.dat">
            <OutputColumn id="v_pop_bistratified_0_bistratifiedcell_v" quantity="pop_bistratified/0/bistratifiedcell/v"/>
        </OutputFile>

        <OutputFile id="Volts_file__pop_sca" fileName="Sim_HippocampalNet.pop_sca.v.dat">
            <OutputColumn id="v_pop_sca_0_scacell_v" quantity="pop_sca/0/scacell/v"/>
        </OutputFile>

        <OutputFile id="Volts_file__pop_olm" fileName="Sim_HippocampalNet.pop_olm.v.dat">
            <OutputColumn id="v_pop_olm_0_olmcell_v" quantity="pop_olm/0/olmcell/v"/>
        </OutputFile>

        <OutputFile id="Volts_file__pop_poolosyn" fileName="Sim_HippocampalNet.pop_poolosyn.v.dat">
            <OutputColumn id="v_pop_poolosyn_0_poolosyncell_v" quantity="pop_poolosyn/0/poolosyncell/v"/>
            <OutputColumn id="v_pop_poolosyn_1_poolosyncell_v" quantity="pop_poolosyn/1/poolosyncell/v"/>
            <OutputColumn id="v_pop_poolosyn_2_poolosyncell_v" quantity="pop_poolosyn/2/poolosyncell/v"/>
            <OutputColumn id="v_pop_poolosyn_3_poolosyncell_v" quantity="pop_poolosyn/3/poolosyncell/v"/>
            <OutputColumn id="v_pop_poolosyn_4_poolosyncell_v" quantity="pop_poolosyn/4/poolosyncell/v"/>
            <OutputColumn id="v_pop_poolosyn_5_poolosyncell_v" quantity="pop_poolosyn/5/poolosyncell/v"/>
            <OutputColumn id="v_pop_poolosyn_6_poolosyncell_v" quantity="pop_poolosyn/6/poolosyncell/v"/>
            <OutputColumn id="v_pop_poolosyn_7_poolosyncell_v" quantity="pop_poolosyn/7/poolosyncell/v"/>
            <OutputColumn id="v_pop_poolosyn_8_poolosyncell_v" quantity="pop_poolosyn/8/poolosyncell/v"/>
            <OutputColumn id="v_pop_poolosyn_9_poolosyncell_v" quantity="pop_poolosyn/9/poolosyncell/v"/>
            <OutputColumn id="v_pop_poolosyn_10_poolosyncell_v" quantity="pop_poolosyn/10/poolosyncell/v"/>
            <OutputColumn id="v_pop_poolosyn_11_poolosyncell_v" quantity="pop_poolosyn/11/poolosyncell/v"/>
            <OutputColumn id="v_pop_poolosyn_12_poolosyncell_v" quantity="pop_poolosyn/12/poolosyncell/v"/>
            <OutputColumn id="v_pop_poolosyn_13_poolosyncell_v" quantity="pop_poolosyn/13/poolosyncell/v"/>
            <OutputColumn id="v_pop_poolosyn_14_poolosyncell_v" quantity="pop_poolosyn/14/poolosyncell/v"/>
            <OutputColumn id="v_pop_poolosyn_15_poolosyncell_v" quantity="pop_poolosyn/15/poolosyncell/v"/>
            <OutputColumn id="v_pop_poolosyn_16_poolosyncell_v" quantity="pop_poolosyn/16/poolosyncell/v"/>
            <OutputColumn id="v_pop_poolosyn_17_poolosyncell_v" quantity="pop_poolosyn/17/poolosyncell/v"/>
            <OutputColumn id="v_pop_poolosyn_18_poolosyncell_v" quantity="pop_poolosyn/18/poolosyncell/v"/>
            <OutputColumn id="v_pop_poolosyn_19_poolosyncell_v" quantity="pop_poolosyn/19/poolosyncell/v"/>
            <OutputColumn id="v_pop_poolosyn_20_poolosyncell_v" quantity="pop_poolosyn/20/poolosyncell/v"/>
            <OutputColumn id="v_pop_poolosyn_21_poolosyncell_v" quantity="pop_poolosyn/21/poolosyncell/v"/>
            <OutputColumn id="v_pop_poolosyn_22_poolosyncell_v" quantity="pop_poolosyn/22/poolosyncell/v"/>
            <OutputColumn id="v_pop_poolosyn_23_poolosyncell_v" quantity="pop_poolosyn/23/poolosyncell/v"/>
            <OutputColumn id="v_pop_poolosyn_24_poolosyncell_v" quantity="pop_poolosyn/24/poolosyncell/v"/>
            <OutputColumn id="v_pop_poolosyn_25_poolosyncell_v" quantity="pop_poolosyn/25/poolosyncell/v"/>
            <OutputColumn id="v_pop_poolosyn_26_poolosyncell_v" quantity="pop_poolosyn/26/poolosyncell/v"/>
            <OutputColumn id="v_pop_poolosyn_27_poolosyncell_v" quantity="pop_poolosyn/27/poolosyncell/v"/>
            <OutputColumn id="v_pop_poolosyn_28_poolosyncell_v" quantity="pop_poolosyn/28/poolosyncell/v"/>
            <OutputColumn id="v_pop_poolosyn_29_poolosyncell_v" quantity="pop_poolosyn/29/poolosyncell/v"/>
            <OutputColumn id="v_pop_poolosyn_30_poolosyncell_v" quantity="pop_poolosyn/30/poolosyncell/v"/>
        </OutputFile>

        <OutputFile id="Volts_file__pop_pvbasket" fileName="Sim_HippocampalNet.pop_pvbasket.v.dat">
            <OutputColumn id="v_pop_pvbasket_0_pvbasketcell_v" quantity="pop_pvbasket/0/pvbasketcell/v"/>
        </OutputFile>

        <OutputFile id="Volts_file__pop_cck" fileName="Sim_HippocampalNet.pop_cck.v.dat">
            <OutputColumn id="v_pop_cck_0_cckcell_v" quantity="pop_cck/0/cckcell/v"/>
        </OutputFile>

        <OutputFile id="Volts_file__pop_axoaxonic" fileName="Sim_HippocampalNet.pop_axoaxonic.v.dat">
            <OutputColumn id="v_pop_axoaxonic_0_axoaxoniccell_v" quantity="pop_axoaxonic/0/axoaxoniccell/v"/>
        </OutputFile>

        <OutputFile id="Volts_file__pop_ivy" fileName="Sim_HippocampalNet.pop_ivy.v.dat">
            <OutputColumn id="v_pop_ivy_0_ivycell_v" quantity="pop_ivy/0/ivycell/v"/>
        </OutputFile>

    </Simulation>

</Lems>
