<Lems>

    <!--

        This LEMS file has been automatically generated using PyNeuroML v0.2.8 (libNeuroML v0.2.28)

     -->

    <!-- Specify which component to run -->
    <Target component="Sim_MiniScale_HippocampalNet"/>

    <!-- Include core NeuroML2 ComponentType definitions -->
    <Include file="Cells.xml"/>
    <Include file="Networks.xml"/>
    <Include file="Simulation.xml"/>

    <Include file="MiniScale_HippocampalNet.net.nml"/>

    <Simulation id="Sim_MiniScale_HippocampalNet" length="1000ms" step="0.025ms" target="MiniScale_HippocampalNet" seed="12345">  <!-- Note seed: ensures same random numbers used every run -->

        <Display id="DispPop__pop_ngf" title="Membrane potentials of cells in pop_ngf" timeScale="1ms" xmin="-100.0" xmax="1100.0" ymin="-90" ymax="50">
            <Line id="pop_ngf[0]: v" quantity="pop_ngf/0/ngfcell/v" scale="1mV" color="#98eb8a" timeScale="1ms"/>
        </Display>

        <Display id="DispPop__pop_bistratified" title="Membrane potentials of cells in pop_bistratified" timeScale="1ms" xmin="-100.0" xmax="1100.0" ymin="-90" ymax="50">
            <Line id="pop_bistratified[0]: v" quantity="pop_bistratified/0/bistratifiedcell/v" scale="1mV" color="#a7b57c" timeScale="1ms"/>
        </Display>

        <Display id="DispPop__pop_sca" title="Membrane potentials of cells in pop_sca" timeScale="1ms" xmin="-100.0" xmax="1100.0" ymin="-90" ymax="50">
            <Line id="pop_sca[0]: v" quantity="pop_sca/0/scacell/v" scale="1mV" color="#a432d9" timeScale="1ms"/>
        </Display>

        <Display id="DispPop__pop_olm" title="Membrane potentials of cells in pop_olm" timeScale="1ms" xmin="-100.0" xmax="1100.0" ymin="-90" ymax="50">
            <Line id="pop_olm[0]: v" quantity="pop_olm/0/olmcell/v" scale="1mV" color="#1f15e8" timeScale="1ms"/>
        </Display>

        <Display id="DispPop__pop_poolosyn" title="Membrane potentials of cells in pop_poolosyn" timeScale="1ms" xmin="-100.0" xmax="1100.0" ymin="-90" ymax="50">
            <Line id="pop_poolosyn[0]: v" quantity="pop_poolosyn/0/poolosyncell/v" scale="1mV" color="#2d27bf" timeScale="1ms"/>
            <Line id="pop_poolosyn[1]: v" quantity="pop_poolosyn/1/poolosyncell/v" scale="1mV" color="#eadcce" timeScale="1ms"/>
            <Line id="pop_poolosyn[2]: v" quantity="pop_poolosyn/2/poolosyncell/v" scale="1mV" color="#079a52" timeScale="1ms"/>
        </Display>

        <Display id="DispPop__pop_pvbasket" title="Membrane potentials of cells in pop_pvbasket" timeScale="1ms" xmin="-100.0" xmax="1100.0" ymin="-90" ymax="50">
            <Line id="pop_pvbasket[0]: v" quantity="pop_pvbasket/0/pvbasketcell/v" scale="1mV" color="#f7e677" timeScale="1ms"/>
        </Display>

        <Display id="DispPop__pop_cck" title="Membrane potentials of cells in pop_cck" timeScale="1ms" xmin="-100.0" xmax="1100.0" ymin="-90" ymax="50">
            <Line id="pop_cck[0]: v" quantity="pop_cck/0/cckcell/v" scale="1mV" color="#f7b7e5" timeScale="1ms"/>
        </Display>

        <Display id="DispPop__pop_axoaxonic" title="Membrane potentials of cells in pop_axoaxonic" timeScale="1ms" xmin="-100.0" xmax="1100.0" ymin="-90" ymax="50">
            <Line id="pop_axoaxonic[0]: v" quantity="pop_axoaxonic/0/axoaxoniccell/v" scale="1mV" color="#2c154c" timeScale="1ms"/>
        </Display>

        <Display id="DispPop__pop_ivy" title="Membrane potentials of cells in pop_ivy" timeScale="1ms" xmin="-100.0" xmax="1100.0" ymin="-90" ymax="50">
            <Line id="pop_ivy[0]: v" quantity="pop_ivy/0/ivycell/v" scale="1mV" color="#923f04" timeScale="1ms"/>
        </Display>

        <OutputFile id="Volts_file__pop_ngf" fileName="Sim_MiniScale_HippocampalNet.pop_ngf.v.dat">
            <OutputColumn id="v_pop_ngf_0_ngfcell_v" quantity="pop_ngf/0/ngfcell/v"/>
        </OutputFile>

        <OutputFile id="Volts_file__pop_bistratified" fileName="Sim_MiniScale_HippocampalNet.pop_bistratified.v.dat">
            <OutputColumn id="v_pop_bistratified_0_bistratifiedcell_v" quantity="pop_bistratified/0/bistratifiedcell/v"/>
        </OutputFile>

        <OutputFile id="Volts_file__pop_sca" fileName="Sim_MiniScale_HippocampalNet.pop_sca.v.dat">
            <OutputColumn id="v_pop_sca_0_scacell_v" quantity="pop_sca/0/scacell/v"/>
        </OutputFile>

        <OutputFile id="Volts_file__pop_olm" fileName="Sim_MiniScale_HippocampalNet.pop_olm.v.dat">
            <OutputColumn id="v_pop_olm_0_olmcell_v" quantity="pop_olm/0/olmcell/v"/>
        </OutputFile>

        <OutputFile id="Volts_file__pop_poolosyn" fileName="Sim_MiniScale_HippocampalNet.pop_poolosyn.v.dat">
            <OutputColumn id="v_pop_poolosyn_0_poolosyncell_v" quantity="pop_poolosyn/0/poolosyncell/v"/>
            <OutputColumn id="v_pop_poolosyn_1_poolosyncell_v" quantity="pop_poolosyn/1/poolosyncell/v"/>
            <OutputColumn id="v_pop_poolosyn_2_poolosyncell_v" quantity="pop_poolosyn/2/poolosyncell/v"/>
        </OutputFile>

        <OutputFile id="Volts_file__pop_pvbasket" fileName="Sim_MiniScale_HippocampalNet.pop_pvbasket.v.dat">
            <OutputColumn id="v_pop_pvbasket_0_pvbasketcell_v" quantity="pop_pvbasket/0/pvbasketcell/v"/>
        </OutputFile>

        <OutputFile id="Volts_file__pop_cck" fileName="Sim_MiniScale_HippocampalNet.pop_cck.v.dat">
            <OutputColumn id="v_pop_cck_0_cckcell_v" quantity="pop_cck/0/cckcell/v"/>
        </OutputFile>

        <OutputFile id="Volts_file__pop_axoaxonic" fileName="Sim_MiniScale_HippocampalNet.pop_axoaxonic.v.dat">
            <OutputColumn id="v_pop_axoaxonic_0_axoaxoniccell_v" quantity="pop_axoaxonic/0/axoaxoniccell/v"/>
        </OutputFile>

        <OutputFile id="Volts_file__pop_ivy" fileName="Sim_MiniScale_HippocampalNet.pop_ivy.v.dat">
            <OutputColumn id="v_pop_ivy_0_ivycell_v" quantity="pop_ivy/0/ivycell/v"/>
        </OutputFile>

        <EventOutputFile id="Spikes_file__pop_ec" fileName="Sim_MiniScale_HippocampalNet.pop_ec.spikes" format="ID_TIME">
            <EventSelection id="0" select="pop_ec/0/spikeGenPoisson" eventPort="spike"/>
            <EventSelection id="1" select="pop_ec/1/spikeGenPoisson" eventPort="spike"/>
            <EventSelection id="2" select="pop_ec/2/spikeGenPoisson" eventPort="spike"/>
        </EventOutputFile>

        <EventOutputFile id="Spikes_file__pop_poolosyn" fileName="Sim_MiniScale_HippocampalNet.pop_poolosyn.spikes" format="ID_TIME">
            <EventSelection id="0" select="pop_poolosyn/0/poolosyncell" eventPort="spike"/>
            <EventSelection id="1" select="pop_poolosyn/1/poolosyncell" eventPort="spike"/>
            <EventSelection id="2" select="pop_poolosyn/2/poolosyncell" eventPort="spike"/>
        </EventOutputFile>

    </Simulation>

</Lems>
