<neuroml xmlns="http://www.neuroml.org/schema/neuroml2"  xmlns:xs="http://www.w3.org/2001/XMLSchema" xmlns:xsi="http://www.w3.org/2001/XMLSchema-instance" xsi:schemaLocation="http://www.neuroml.org/schema/neuroml2 https://raw.github.com/NeuroML/NeuroML2/development/Schemas/NeuroML2/NeuroML_v2beta5.xsd" id="HippocampalNet">
    <include href="../cells/axoaxonic.cell.nml"></include>
    <include href="../cells/bistratified.cell.nml"></include>
    <include href="../cells/cck.cell.nml"></include>
    <include href="../cells/cutsuridis.cell.nml"></include>
    <include href="../cells/ivy.cell.nml"></include>
    <include href="../cells/ngf.cell.nml"></include>
    <include href="../cells/olm.cell.nml"></include>
    <include href="../cells/poolosyn.cell.nml"></include>
    <include href="../cells/pvbasket.cell.nml"></include>
    <include href="../cells/sca.cell.nml"></include>
    <include href="../synapses/exp2Synapses.synapse.nml"></include>
    <include href="../synapses/customGABASynapses.synapse.nml"></include>
    <include href="stimulations.nml"></include>
    <voltageClamp id="vc_ngf" delay="0ms" duration="1ms" targetVoltage="-59.9512mV" simpleSeriesResistance="5e4ohm"/>
    <voltageClamp id="vc_bistratified" delay="0ms" duration="1ms" targetVoltage="-67.0184mV" simpleSeriesResistance="5e4ohm"/>
    <voltageClamp id="vc_sca" delay="0ms" duration="1ms" targetVoltage="-70.5652mV" simpleSeriesResistance="5e4ohm"/>
    <voltageClamp id="vc_olm" delay="0ms" duration="1ms" targetVoltage="-71.1411mV" simpleSeriesResistance="5e4ohm"/>
    <voltageClamp id="vc_ivy" delay="0ms" duration="1ms" targetVoltage="-59.9512mV" simpleSeriesResistance="5e4ohm"/>
    <voltageClamp id="vc_pvbasket" delay="0ms" duration="1ms" targetVoltage="-65.0246mV" simpleSeriesResistance="5e4ohm"/>
    <voltageClamp id="vc_cck" delay="0ms" duration="1ms" targetVoltage="-70.6306mV" simpleSeriesResistance="5e4ohm"/>
    <voltageClamp id="vc_axoaxonic" delay="0ms" duration="1ms" targetVoltage="-65.0127mV" simpleSeriesResistance="5e4ohm"/>
    <voltageClamp id="vc_poolosyn" delay="0ms" duration="1ms" targetVoltage="-62.9601mV" simpleSeriesResistance="5e4ohm"/>
    <network id="HippocampalNet" type="networkWithTemperature" temperature="34.0 degC">
        <notes>Network generated using libNeuroML v0.2.13</notes>
        <population id="pop_ngf" component="ngfcell" size="1" type="populationList">
            <instance id="0">
                <location x="60.261543419974252" y="246.285789288179132" z="63.465744733724129"/>
            </instance>
        </population>
        <population id="pop_bistratified" component="bistratifiedcell" size="1" type="populationList">
            <instance id="0">
                <location x="498.235388141013459" y="231.83698361486239" z="207.841255027526159"/>
            </instance>
        </population>
        <population id="pop_sca" component="scacell" size="1" type="populationList">
            <instance id="0">
                <location x="62.318725328131045" y="346.238891825598273" z="227.325277110730184"/>
            </instance>
        </population>
        <population id="pop_olm" component="olmcell" size="1" type="populationList">
            <instance id="0">
                <location x="908.435382904386415" y="358.773725834073673" z="419.51282682855981"/>
            </instance>
        </population>
        <population id="pop_ec" component="spikeGenPoisson" size="25" type="populationList">
            <instance id="0">
                <location x="638.322187655345829" y="280.463351782257917" z="154.188715541323006"/>
            </instance>
            <instance id="1">
                <location x="1235.967068386866003" y="180.498110790693914" z="279.663235903323027"/>
            </instance>
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        </population>
        <population id="pop_poolosyn" component="poolosyncell" size="31" type="populationList">
            <instance id="0">
                <location x="1274.627025943729222" y="138.634940493304867" z="71.092963432821449"/>
            </instance>
            <instance id="1">
                <location x="361.708627977789376" y="177.254933466240999" z="128.08995254898764"/>
            </instance>
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        </population>
        <population id="pop_pvbasket" component="pvbasketcell" size="1" type="populationList">
            <instance id="0">
                <location x="429.972233389556209" y="63.537960379500682" z="378.156448082998907"/>
            </instance>
        </population>
        <population id="pop_ca3" component="spikeGenPoisson" size="20" type="populationList">
            <instance id="0">
                <location x="120.19760814603103" y="325.523215801840536" z="362.643494486022746"/>
            </instance>
            <instance id="1">
                <location x="534.088869893388278" y="385.654457239327655" z="309.872449507190595"/>
            </instance>
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        </population>
        <population id="pop_cck" component="cckcell" size="1" type="populationList">
            <instance id="0">
                <location x="572.335175335082454" y="397.646857803761577" z="358.198570991583153"/>
            </instance>
        </population>
        <population id="pop_axoaxonic" component="axoaxoniccell" size="1" type="populationList">
            <instance id="0">
                <location x="1068.618642036546362" y="109.362954582398245" z="377.800650679220382"/>
            </instance>
        </population>
        <population id="pop_ivy" component="ivycell" size="1" type="populationList">
            <instance id="0">
                <location x="1456.358798906230504" y="234.277310384986237" z="5.050461799732231"/>
            </instance>
        </population>
        <projection id="proj_cckpop_to_bistratifiedpop" presynapticPopulation="pop_cck" postsynapticPopulation="pop_bistratified" synapse="syn_cck_to_bistratified">
            <connectionWD id="0" preCellId="../pop_cck/0/cckcell" preSegmentId="2" preFractionAlong="0.0" postCellId="../pop_bistratified/0/bistratifiedcell" postSegmentId="2" postFractionAlong="0.0" weight="1." delay="3ms"/>
            <connectionWD id="1" preCellId="../pop_cck/0/cckcell" preSegmentId="2" preFractionAlong="0.0" postCellId="../pop_bistratified/0/bistratifiedcell" postSegmentId="23" postFractionAlong="0.99999907894" weight="1." delay="3ms"/>
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        </projection>
        <projection id="proj_ca3pop_to_poolosynpop" presynapticPopulation="pop_ca3" postsynapticPopulation="pop_poolosyn" synapse="syn_ca3_to_poolosyn">
            <connectionWD id="0" preCellId="../pop_ca3/7/spikeGenPoisson" preSegmentId="0" preFractionAlong="0.5" postCellId="../pop_poolosyn/0/poolosyncell" postSegmentId="635" postFractionAlong="0.500006163538" weight="1." delay="3ms"/>
            <connectionWD id="1" preCellId="../pop_ca3/7/spikeGenPoisson" preSegmentId="0" preFractionAlong="0.5" postCellId="../pop_poolosyn/0/poolosyncell" postSegmentId="591" postFractionAlong="2.98107020416e-05" weight="1." delay="3ms"/>
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        </projection>
        <projection id="proj_scapop_to_pvbasketpop" presynapticPopulation="pop_sca" postsynapticPopulation="pop_pvbasket" synapse="syn_sca_to_pvbasket">
            <connectionWD id="0" preCellId="../pop_sca/0/scacell" preSegmentId="2" preFractionAlong="0.0" postCellId="../pop_pvbasket/0/pvbasketcell" postSegmentId="26" postFractionAlong="5.3164139797e-07" weight="1." delay="3ms"/>
            <connectionWD id="1" preCellId="../pop_sca/0/scacell" preSegmentId="2" preFractionAlong="0.0" postCellId="../pop_pvbasket/0/pvbasketcell" postSegmentId="32" postFractionAlong="9.21061780579e-07" weight="1." delay="3ms"/>
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        </projection>
        <projection id="proj_ecpop_to_ngfpop" presynapticPopulation="pop_ec" postsynapticPopulation="pop_ngf" synapse="syn_ec_to_ngf">
            <connectionWD id="0" preCellId="../pop_ec/14/spikeGenPoisson" preSegmentId="0" preFractionAlong="0.5" postCellId="../pop_ngf/0/ngfcell" postSegmentId="22" postFractionAlong="5.68434342085e-16" weight="1." delay="3ms"/>
            <connectionWD id="1" preCellId="../pop_ec/14/spikeGenPoisson" preSegmentId="0" preFractionAlong="0.5" postCellId="../pop_ngf/0/ngfcell" postSegmentId="17" postFractionAlong="0.999997468791" weight="1." delay="3ms"/>
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        </projection>
        <projection id="proj_ca3pop_to_scapop" presynapticPopulation="pop_ca3" postsynapticPopulation="pop_sca" synapse="syn_ca3_to_sca">
            <connectionWD id="0" preCellId="../pop_ca3/3/spikeGenPoisson" preSegmentId="0" preFractionAlong="0.5" postCellId="../pop_sca/0/scacell" postSegmentId="15" postFractionAlong="0.999999610581" weight="1." delay="3ms"/>
            <connectionWD id="1" preCellId="../pop_ca3/3/spikeGenPoisson" preSegmentId="0" preFractionAlong="0.5" postCellId="../pop_sca/0/scacell" postSegmentId="32" postFractionAlong="9.21061780579e-07" weight="1." delay="3ms"/>
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        </projection>
        <projection id="proj_bistratifiedpop_to_olmpop" presynapticPopulation="pop_bistratified" postsynapticPopulation="pop_olm" synapse="syn_bistratified_to_olm">
            <connectionWD id="0" preCellId="../pop_bistratified/0/bistratifiedcell" preSegmentId="2" preFractionAlong="0.0" postCellId="../pop_olm/0/olmcell" postSegmentId="5" postFractionAlong="0.885" weight="1." delay="3ms"/>
            <connectionWD id="1" preCellId="../pop_bistratified/0/bistratifiedcell" preSegmentId="2" preFractionAlong="0.0" postCellId="../pop_olm/0/olmcell" postSegmentId="3" postFractionAlong="0.885" weight="1." delay="3ms"/>
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        </projection>
        <projection id="proj_ivypop_to_poolosynpop" presynapticPopulation="pop_ivy" postsynapticPopulation="pop_poolosyn" synapse="syn_ivy_to_poolosyn">
            <connectionWD id="0" preCellId="../pop_ivy/0/ivycell" preSegmentId="2" preFractionAlong="0.0" postCellId="../pop_poolosyn/10/poolosyncell" postSegmentId="642" postFractionAlong="2.32740831406e-05" weight="1." delay="3ms"/>
            <connectionWD id="1" preCellId="../pop_ivy/0/ivycell" preSegmentId="2" preFractionAlong="0.0" postCellId="../pop_poolosyn/10/poolosyncell" postSegmentId="580" postFractionAlong="0.499992603139" weight="1." delay="3ms"/>
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        </projection>
        <projection id="proj_cckpop_to_ivypop" presynapticPopulation="pop_cck" postsynapticPopulation="pop_ivy" synapse="syn_cck_to_ivy">
            <connectionWD id="0" preCellId="../pop_cck/0/cckcell" preSegmentId="2" preFractionAlong="0.0" postCellId="../pop_ivy/0/ivycell" postSegmentId="23" postFractionAlong="0.99999907894" weight="1." delay="3ms"/>
            <connectionWD id="1" preCellId="../pop_cck/0/cckcell" preSegmentId="2" preFractionAlong="0.0" postCellId="../pop_ivy/0/ivycell" postSegmentId="23" postFractionAlong="0.99999907894" weight="1." delay="3ms"/>
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        </projection>
        <projection id="proj_olmpop_to_axoaxonicpop" presynapticPopulation="pop_olm" postsynapticPopulation="pop_axoaxonic" synapse="syn_olm_to_axoaxonic">
            <connectionWD id="0" preCellId="../pop_olm/0/olmcell" preSegmentId="2" preFractionAlong="0.0" postCellId="../pop_axoaxonic/0/axoaxoniccell" postSegmentId="12" postFractionAlong="5.68434342085e-16" weight="1." delay="3ms"/>
            <connectionWD id="1" preCellId="../pop_olm/0/olmcell" preSegmentId="2" preFractionAlong="0.0" postCellId="../pop_axoaxonic/0/axoaxoniccell" postSegmentId="22" postFractionAlong="5.68434342085e-16" weight="1." delay="3ms"/>
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        </projection>
        <projection id="proj_ivypop_to_ivypop" presynapticPopulation="pop_ivy" postsynapticPopulation="pop_ivy" synapse="syn_ivy_to_ivy">
            <connectionWD id="0" preCellId="../pop_ivy/0/ivycell" preSegmentId="2" preFractionAlong="0.0" postCellId="../pop_ivy/0/ivycell" postSegmentId="30" postFractionAlong="1.31047759686e-06" weight="1." delay="3ms"/>
            <connectionWD id="1" preCellId="../pop_ivy/0/ivycell" preSegmentId="2" preFractionAlong="0.0" postCellId="../pop_ivy/0/ivycell" postSegmentId="32" postFractionAlong="9.21061780579e-07" weight="1." delay="3ms"/>
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        </projection>
        <projection id="proj_poolosynpop_to_scapop" presynapticPopulation="pop_poolosyn" postsynapticPopulation="pop_sca" synapse="syn_poolosyn_to_sca">
            <connectionWD id="0" preCellId="../pop_poolosyn/17/poolosyncell" preSegmentId="2" preFractionAlong="0.0" postCellId="../pop_sca/0/scacell" postSegmentId="17" postFractionAlong="0.999997468791" weight="1." delay="3ms"/>
            <connectionWD id="1" preCellId="../pop_poolosyn/17/poolosyncell" preSegmentId="2" preFractionAlong="0.0" postCellId="../pop_sca/0/scacell" postSegmentId="7" postFractionAlong="0.999997468791" weight="1." delay="3ms"/>
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        </projection>
        <projection id="proj_bistratifiedpop_to_axoaxonicpop" presynapticPopulation="pop_bistratified" postsynapticPopulation="pop_axoaxonic" synapse="syn_bistratified_to_axoaxonic">
            <connectionWD id="0" preCellId="../pop_bistratified/0/bistratifiedcell" preSegmentId="2" preFractionAlong="0.0" postCellId="../pop_axoaxonic/0/axoaxoniccell" postSegmentId="14" postFractionAlong="0.0" weight="1." delay="3ms"/>
            <connectionWD id="1" preCellId="../pop_bistratified/0/bistratifiedcell" preSegmentId="2" preFractionAlong="0.0" postCellId="../pop_axoaxonic/0/axoaxoniccell" postSegmentId="32" postFractionAlong="9.21061780579e-07" weight="1." delay="3ms"/>
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        </projection>
        <projection id="proj_cckpop_to_cckpop" presynapticPopulation="pop_cck" postsynapticPopulation="pop_cck" synapse="syn_cck_to_cck">
            <connectionWD id="0" preCellId="../pop_cck/0/cckcell" preSegmentId="2" preFractionAlong="0.0" postCellId="../pop_cck/0/cckcell" postSegmentId="23" postFractionAlong="0.99999907894" weight="1." delay="3ms"/>
            <connectionWD id="1" preCellId="../pop_cck/0/cckcell" preSegmentId="2" preFractionAlong="0.0" postCellId="../pop_cck/0/cckcell" postSegmentId="4" postFractionAlong="0.0" weight="1." delay="3ms"/>
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        </projection>
        <projection id="proj_olmpop_to_bistratifiedpop" presynapticPopulation="pop_olm" postsynapticPopulation="pop_bistratified" synapse="syn_olm_to_bistratified">
            <connectionWD id="0" preCellId="../pop_olm/0/olmcell" preSegmentId="2" preFractionAlong="0.0" postCellId="../pop_bistratified/0/bistratifiedcell" postSegmentId="17" postFractionAlong="0.999997468791" weight="1." delay="3ms"/>
            <connectionWD id="1" preCellId="../pop_olm/0/olmcell" preSegmentId="2" preFractionAlong="0.0" postCellId="../pop_bistratified/0/bistratifiedcell" postSegmentId="17" postFractionAlong="0.999997468791" weight="1." delay="3ms"/>
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        </projection>
        <projection id="proj_scapop_to_scapop" presynapticPopulation="pop_sca" postsynapticPopulation="pop_sca" synapse="syn_sca_to_sca">
            <connectionWD id="0" preCellId="../pop_sca/0/scacell" preSegmentId="2" preFractionAlong="0.0" postCellId="../pop_sca/0/scacell" postSegmentId="32" postFractionAlong="9.21061780579e-07" weight="1." delay="3ms"/>
            <connectionWD id="1" preCellId="../pop_sca/0/scacell" preSegmentId="2" preFractionAlong="0.0" postCellId="../pop_sca/0/scacell" postSegmentId="4" postFractionAlong="0.0" weight="1." delay="3ms"/>
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        </projection>
        <projection id="proj_pvbasketpop_to_axoaxonicpop" presynapticPopulation="pop_pvbasket" postsynapticPopulation="pop_axoaxonic" synapse="syn_pvbasket_to_axoaxonic">
            <connectionWD id="0" preCellId="../pop_pvbasket/0/pvbasketcell" preSegmentId="2" preFractionAlong="0.0" postCellId="../pop_axoaxonic/0/axoaxoniccell" postSegmentId="2" postFractionAlong="0.0" weight="1." delay="3ms"/>
        </projection>
        <projection id="proj_ca3pop_to_ivypop" presynapticPopulation="pop_ca3" postsynapticPopulation="pop_ivy" synapse="syn_ca3_to_ivy">
            <connectionWD id="0" preCellId="../pop_ca3/17/spikeGenPoisson" preSegmentId="0" preFractionAlong="0.5" postCellId="../pop_ivy/0/ivycell" postSegmentId="32" postFractionAlong="9.21061780579e-07" weight="1." delay="3ms"/>
            <connectionWD id="1" preCellId="../pop_ca3/17/spikeGenPoisson" preSegmentId="0" preFractionAlong="0.5" postCellId="../pop_ivy/0/ivycell" postSegmentId="15" postFractionAlong="0.999999610581" weight="1." delay="3ms"/>
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        </projection>
        <projection id="proj_ivypop_to_cckpop" presynapticPopulation="pop_ivy" postsynapticPopulation="pop_cck" synapse="syn_ivy_to_cck">
            <connectionWD id="0" preCellId="../pop_ivy/0/ivycell" preSegmentId="2" preFractionAlong="0.0" postCellId="../pop_cck/0/cckcell" postSegmentId="26" postFractionAlong="5.3164139797e-07" weight="1." delay="3ms"/>
            <connectionWD id="1" preCellId="../pop_ivy/0/ivycell" preSegmentId="2" preFractionAlong="0.0" postCellId="../pop_cck/0/cckcell" postSegmentId="30" postFractionAlong="1.31047759686e-06" weight="1." delay="3ms"/>
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        </projection>
        <projection id="proj_pvbasketpop_to_bistratifiedpop" presynapticPopulation="pop_pvbasket" postsynapticPopulation="pop_bistratified" synapse="syn_pvbasket_to_bistratified">
            <connectionWD id="0" preCellId="../pop_pvbasket/0/pvbasketcell" preSegmentId="2" preFractionAlong="0.0" postCellId="../pop_bistratified/0/bistratifiedcell" postSegmentId="2" postFractionAlong="0.0" weight="1." delay="3ms"/>
        </projection>
        <projection id="proj_bistratifiedpop_to_pvbasketpop" presynapticPopulation="pop_bistratified" postsynapticPopulation="pop_pvbasket" synapse="syn_bistratified_to_pvbasket">
            <connectionWD id="0" preCellId="../pop_bistratified/0/bistratifiedcell" preSegmentId="2" preFractionAlong="0.0" postCellId="../pop_pvbasket/0/pvbasketcell" postSegmentId="5" postFractionAlong="0.999999610581" weight="1." delay="3ms"/>
            <connectionWD id="1" preCellId="../pop_bistratified/0/bistratifiedcell" preSegmentId="2" preFractionAlong="0.0" postCellId="../pop_pvbasket/0/pvbasketcell" postSegmentId="5" postFractionAlong="0.999999610581" weight="1." delay="3ms"/>
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        </projection>
        <projection id="proj_pvbasketpop_to_poolosynpop" presynapticPopulation="pop_pvbasket" postsynapticPopulation="pop_poolosyn" synapse="syn_pvbasket_to_poolosyn">
            <connectionWD id="0" preCellId="../pop_pvbasket/0/pvbasketcell" preSegmentId="2" preFractionAlong="0.0" postCellId="../pop_poolosyn/10/poolosyncell" postSegmentId="2" postFractionAlong="0.0" weight="1." delay="3ms"/>
            <connectionWD id="1" preCellId="../pop_pvbasket/0/pvbasketcell" preSegmentId="2" preFractionAlong="0.0" postCellId="../pop_poolosyn/10/poolosyncell" postSegmentId="20" postFractionAlong="0.0" weight="1." delay="3ms"/>
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        </projection>
        <projection id="proj_ca3pop_to_pvbasketpop" presynapticPopulation="pop_ca3" postsynapticPopulation="pop_pvbasket" synapse="syn_ca3_to_pvbasket">
            <connectionWD id="0" preCellId="../pop_ca3/2/spikeGenPoisson" preSegmentId="0" preFractionAlong="0.5" postCellId="../pop_pvbasket/0/pvbasketcell" postSegmentId="15" postFractionAlong="0.999999610581" weight="1." delay="3ms"/>
            <connectionWD id="1" preCellId="../pop_ca3/2/spikeGenPoisson" preSegmentId="0" preFractionAlong="0.5" postCellId="../pop_pvbasket/0/pvbasketcell" postSegmentId="23" postFractionAlong="0.99999907894" weight="1." delay="3ms"/>
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        </projection>
        <projection id="proj_ecpop_to_cckpop" presynapticPopulation="pop_ec" postsynapticPopulation="pop_cck" synapse="syn_ec_to_cck">
            <connectionWD id="0" preCellId="../pop_ec/13/spikeGenPoisson" preSegmentId="0" preFractionAlong="0.5" postCellId="../pop_cck/0/cckcell" postSegmentId="7" postFractionAlong="0.999997468791" weight="1." delay="3ms"/>
            <connectionWD id="1" preCellId="../pop_ec/13/spikeGenPoisson" preSegmentId="0" preFractionAlong="0.5" postCellId="../pop_cck/0/cckcell" postSegmentId="17" postFractionAlong="0.999997468791" weight="1." delay="3ms"/>
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        </projection>
        <projection id="proj_bistratifiedpop_to_cckpop" presynapticPopulation="pop_bistratified" postsynapticPopulation="pop_cck" synapse="syn_bistratified_to_cck">
            <connectionWD id="0" preCellId="../pop_bistratified/0/bistratifiedcell" preSegmentId="2" preFractionAlong="0.0" postCellId="../pop_cck/0/cckcell" postSegmentId="30" postFractionAlong="1.31047759686e-06" weight="1." delay="3ms"/>
            <connectionWD id="1" preCellId="../pop_bistratified/0/bistratifiedcell" preSegmentId="2" preFractionAlong="0.0" postCellId="../pop_cck/0/cckcell" postSegmentId="30" postFractionAlong="1.31047759686e-06" weight="1." delay="3ms"/>
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        </projection>
        <projection id="proj_ngfpop_to_poolosynpop_A" presynapticPopulation="pop_ngf" postsynapticPopulation="pop_poolosyn" synapse="syn_ngf_to_poolosyn_A">
            <connectionWD id="0" preCellId="../pop_ngf/0/ngfcell" preSegmentId="2" preFractionAlong="0.0" postCellId="../pop_poolosyn/10/poolosyncell" postSegmentId="335" postFractionAlong="0.999974923653" weight="1." delay="3ms"/>
            <connectionWD id="1" preCellId="../pop_ngf/0/ngfcell" preSegmentId="2" preFractionAlong="0.0" postCellId="../pop_poolosyn/10/poolosyncell" postSegmentId="226" postFractionAlong="0.999975814969" weight="1." delay="3ms"/>
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        </projection>
        <projection id="proj_ngfpop_to_poolosynpop_B" presynapticPopulation="pop_ngf" postsynapticPopulation="pop_poolosyn" synapse="syn_ngf_to_poolosyn_B">
            <connectionWD id="0" preCellId="../pop_ngf/0/ngfcell" preSegmentId="2" preFractionAlong="0.0" postCellId="../pop_poolosyn/10/poolosyncell" postSegmentId="335" postFractionAlong="0.999974923653" weight="1." delay="3ms"/>
            <connectionWD id="1" preCellId="../pop_ngf/0/ngfcell" preSegmentId="2" preFractionAlong="0.0" postCellId="../pop_poolosyn/10/poolosyncell" postSegmentId="226" postFractionAlong="0.999975814969" weight="1." delay="3ms"/>
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        </projection>
        <projection id="proj_ivypop_to_scapop" presynapticPopulation="pop_ivy" postsynapticPopulation="pop_sca" synapse="syn_ivy_to_sca">
            <connectionWD id="0" preCellId="../pop_ivy/0/ivycell" preSegmentId="2" preFractionAlong="0.0" postCellId="../pop_sca/0/scacell" postSegmentId="14" postFractionAlong="0.0" weight="1." delay="3ms"/>
            <connectionWD id="1" preCellId="../pop_ivy/0/ivycell" preSegmentId="2" preFractionAlong="0.0" postCellId="../pop_sca/0/scacell" postSegmentId="5" postFractionAlong="0.999999610581" weight="1." delay="3ms"/>
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        </projection>
        <projection id="proj_olmpop_to_olmpop" presynapticPopulation="pop_olm" postsynapticPopulation="pop_olm" synapse="syn_olm_to_olm">
            <connectionWD id="0" preCellId="../pop_olm/0/olmcell" preSegmentId="2" preFractionAlong="0.0" postCellId="../pop_olm/0/olmcell" postSegmentId="3" postFractionAlong="0.885" weight="1." delay="3ms"/>
            <connectionWD id="1" preCellId="../pop_olm/0/olmcell" preSegmentId="2" preFractionAlong="0.0" postCellId="../pop_olm/0/olmcell" postSegmentId="5" postFractionAlong="0.885" weight="1." delay="3ms"/>
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        </projection>
        <projection id="proj_poolosynpop_to_bistratifiedpop" presynapticPopulation="pop_poolosyn" postsynapticPopulation="pop_bistratified" synapse="syn_poolosyn_to_bistratified">
            <connectionWD id="0" preCellId="../pop_poolosyn/17/poolosyncell" preSegmentId="2" preFractionAlong="0.0" postCellId="../pop_bistratified/0/bistratifiedcell" postSegmentId="7" postFractionAlong="0.999997468791" weight="1." delay="3ms"/>
            <connectionWD id="1" preCellId="../pop_poolosyn/17/poolosyncell" preSegmentId="2" preFractionAlong="0.0" postCellId="../pop_bistratified/0/bistratifiedcell" postSegmentId="5" postFractionAlong="0.999999610581" weight="1." delay="3ms"/>
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        </projection>
        <projection id="proj_axoaxonicpop_to_poolosynpop" presynapticPopulation="pop_axoaxonic" postsynapticPopulation="pop_poolosyn" synapse="syn_axoaxonic_to_poolosyn">
            <connectionWD id="0" preCellId="../pop_axoaxonic/0/axoaxoniccell" preSegmentId="2" preFractionAlong="0.0" postCellId="../pop_poolosyn/10/poolosyncell" postSegmentId="763" weight="1." delay="3ms"/>
            <connectionWD id="1" preCellId="../pop_axoaxonic/0/axoaxoniccell" preSegmentId="2" preFractionAlong="0.0" postCellId="../pop_poolosyn/10/poolosyncell" postSegmentId="763" weight="1." delay="3ms"/>
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        </projection>
        <projection id="proj_ivypop_to_ngfpop" presynapticPopulation="pop_ivy" postsynapticPopulation="pop_ngf" synapse="syn_ivy_to_ngf">
            <connectionWD id="0" preCellId="../pop_ivy/0/ivycell" preSegmentId="2" preFractionAlong="0.0" postCellId="../pop_ngf/0/ngfcell" postSegmentId="5" postFractionAlong="0.999999610581" weight="1." delay="3ms"/>
            <connectionWD id="1" preCellId="../pop_ivy/0/ivycell" preSegmentId="2" preFractionAlong="0.0" postCellId="../pop_ngf/0/ngfcell" postSegmentId="15" postFractionAlong="0.999999610581" weight="1." delay="3ms"/>
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        </projection>
        <projection id="proj_ivypop_to_olmpop" presynapticPopulation="pop_ivy" postsynapticPopulation="pop_olm" synapse="syn_ivy_to_olm">
            <connectionWD id="0" preCellId="../pop_ivy/0/ivycell" preSegmentId="2" preFractionAlong="0.0" postCellId="../pop_olm/0/olmcell" postSegmentId="3" postFractionAlong="0.885" weight="1." delay="3ms"/>
            <connectionWD id="1" preCellId="../pop_ivy/0/ivycell" preSegmentId="2" preFractionAlong="0.0" postCellId="../pop_olm/0/olmcell" postSegmentId="3" postFractionAlong="0.885" weight="1." delay="3ms"/>
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        </projection>
        <projection id="proj_ecpop_to_scapop" presynapticPopulation="pop_ec" postsynapticPopulation="pop_sca" synapse="syn_ec_to_sca">
            <connectionWD id="0" preCellId="../pop_ec/17/spikeGenPoisson" preSegmentId="0" preFractionAlong="0.5" postCellId="../pop_sca/0/scacell" postSegmentId="34" postFractionAlong="1.94710771066e-06" weight="1." delay="3ms"/>
            <connectionWD id="1" preCellId="../pop_ec/17/spikeGenPoisson" preSegmentId="0" preFractionAlong="0.5" postCellId="../pop_sca/0/scacell" postSegmentId="12" postFractionAlong="5.68434342085e-16" weight="1." delay="3ms"/>
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        </projection>
        <projection id="proj_pvbasketpop_to_scapop" presynapticPopulation="pop_pvbasket" postsynapticPopulation="pop_sca" synapse="syn_pvbasket_to_sca">
            <connectionWD id="0" preCellId="../pop_pvbasket/0/pvbasketcell" preSegmentId="2" preFractionAlong="0.0" postCellId="../pop_sca/0/scacell" postSegmentId="2" postFractionAlong="0.0" weight="1." delay="3ms"/>
        </projection>
        <projection id="proj_olmpop_to_cckpop" presynapticPopulation="pop_olm" postsynapticPopulation="pop_cck" synapse="syn_olm_to_cck">
            <connectionWD id="0" preCellId="../pop_olm/0/olmcell" preSegmentId="2" preFractionAlong="0.0" postCellId="../pop_cck/0/cckcell" postSegmentId="22" postFractionAlong="5.68434342085e-16" weight="1." delay="3ms"/>
            <connectionWD id="1" preCellId="../pop_olm/0/olmcell" preSegmentId="2" preFractionAlong="0.0" postCellId="../pop_cck/0/cckcell" postSegmentId="22" postFractionAlong="5.68434342085e-16" weight="1." delay="3ms"/>
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        </projection>
        <projection id="proj_scapop_to_cckpop" presynapticPopulation="pop_sca" postsynapticPopulation="pop_cck" synapse="syn_sca_to_cck">
            <connectionWD id="0" preCellId="../pop_sca/0/scacell" preSegmentId="2" preFractionAlong="0.0" postCellId="../pop_cck/0/cckcell" postSegmentId="26" postFractionAlong="5.3164139797e-07" weight="1." delay="3ms"/>
            <connectionWD id="1" preCellId="../pop_sca/0/scacell" preSegmentId="2" preFractionAlong="0.0" postCellId="../pop_cck/0/cckcell" postSegmentId="26" postFractionAlong="5.3164139797e-07" weight="1." delay="3ms"/>
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        </projection>
        <projection id="proj_bistratifiedpop_to_poolosynpop" presynapticPopulation="pop_bistratified" postsynapticPopulation="pop_poolosyn" synapse="syn_bistratified_to_poolosyn">
            <connectionWD id="0" preCellId="../pop_bistratified/0/bistratifiedcell" preSegmentId="2" preFractionAlong="0.0" postCellId="../pop_poolosyn/10/poolosyncell" postSegmentId="489" postFractionAlong="0.5" weight="1." delay="3ms"/>
            <connectionWD id="1" preCellId="../pop_bistratified/0/bistratifiedcell" preSegmentId="2" preFractionAlong="0.0" postCellId="../pop_poolosyn/10/poolosyncell" postSegmentId="552" postFractionAlong="0.499998349306" weight="1." delay="3ms"/>
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        </projection>
        <projection id="proj_cckpop_to_pvbasketpop" presynapticPopulation="pop_cck" postsynapticPopulation="pop_pvbasket" synapse="syn_cck_to_pvbasket">
            <connectionWD id="0" preCellId="../pop_cck/0/cckcell" preSegmentId="2" preFractionAlong="0.0" postCellId="../pop_pvbasket/0/pvbasketcell" postSegmentId="23" postFractionAlong="0.99999907894" weight="1." delay="3ms"/>
            <connectionWD id="1" preCellId="../pop_cck/0/cckcell" preSegmentId="2" preFractionAlong="0.0" postCellId="../pop_pvbasket/0/pvbasketcell" postSegmentId="23" postFractionAlong="0.99999907894" weight="1." delay="3ms"/>
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        </projection>
        <projection id="proj_poolosynpop_to_axoaxonicpop" presynapticPopulation="pop_poolosyn" postsynapticPopulation="pop_axoaxonic" synapse="syn_poolosyn_to_axoaxonic">
            <connectionWD id="0" preCellId="../pop_poolosyn/17/poolosyncell" preSegmentId="2" preFractionAlong="0.0" postCellId="../pop_axoaxonic/0/axoaxoniccell" postSegmentId="12" postFractionAlong="5.68434342085e-16" weight="1." delay="3ms"/>
            <connectionWD id="1" preCellId="../pop_poolosyn/17/poolosyncell" preSegmentId="2" preFractionAlong="0.0" postCellId="../pop_axoaxonic/0/axoaxoniccell" postSegmentId="17" postFractionAlong="0.999997468791" weight="1." delay="3ms"/>
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        </projection>
        <projection id="proj_poolosynpop_to_ivypop" presynapticPopulation="pop_poolosyn" postsynapticPopulation="pop_ivy" synapse="syn_poolosyn_to_ivy">
            <connectionWD id="0" preCellId="../pop_poolosyn/17/poolosyncell" preSegmentId="2" preFractionAlong="0.0" postCellId="../pop_ivy/0/ivycell" postSegmentId="22" postFractionAlong="5.68434342085e-16" weight="1." delay="3ms"/>
            <connectionWD id="1" preCellId="../pop_poolosyn/17/poolosyncell" preSegmentId="2" preFractionAlong="0.0" postCellId="../pop_ivy/0/ivycell" postSegmentId="12" postFractionAlong="5.68434342085e-16" weight="1." delay="3ms"/>
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        </projection>
        <projection id="proj_pvbasketpop_to_pvbasketpop" presynapticPopulation="pop_pvbasket" postsynapticPopulation="pop_pvbasket" synapse="syn_pvbasket_to_pvbasket">
            <connectionWD id="0" preCellId="../pop_pvbasket/0/pvbasketcell" preSegmentId="2" preFractionAlong="0.0" postCellId="../pop_pvbasket/0/pvbasketcell" postSegmentId="2" postFractionAlong="0.0" weight="1." delay="3ms"/>
        </projection>
        <projection id="proj_ivypop_to_axoaxonicpop" presynapticPopulation="pop_ivy" postsynapticPopulation="pop_axoaxonic" synapse="syn_ivy_to_axoaxonic">
            <connectionWD id="0" preCellId="../pop_ivy/0/ivycell" preSegmentId="2" preFractionAlong="0.0" postCellId="../pop_axoaxonic/0/axoaxoniccell" postSegmentId="14" postFractionAlong="0.0" weight="1." delay="3ms"/>
            <connectionWD id="1" preCellId="../pop_ivy/0/ivycell" preSegmentId="2" preFractionAlong="0.0" postCellId="../pop_axoaxonic/0/axoaxoniccell" postSegmentId="15" postFractionAlong="0.999999610581" weight="1." delay="3ms"/>
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        </projection>
        <projection id="proj_ecpop_to_axoaxonicpop" presynapticPopulation="pop_ec" postsynapticPopulation="pop_axoaxonic" synapse="syn_ec_to_axoaxonic">
            <connectionWD id="0" preCellId="../pop_ec/12/spikeGenPoisson" preSegmentId="0" preFractionAlong="0.5" postCellId="../pop_axoaxonic/0/axoaxoniccell" postSegmentId="5" postFractionAlong="0.999999610581" weight="1." delay="3ms"/>
            <connectionWD id="1" preCellId="../pop_ec/12/spikeGenPoisson" preSegmentId="0" preFractionAlong="0.5" postCellId="../pop_axoaxonic/0/axoaxoniccell" postSegmentId="34" postFractionAlong="1.94710771066e-06" weight="1." delay="3ms"/>
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        </projection>
        <projection id="proj_olmpop_to_ngfpop" presynapticPopulation="pop_olm" postsynapticPopulation="pop_ngf" synapse="syn_olm_to_ngf">
            <connectionWD id="0" preCellId="../pop_olm/0/olmcell" preSegmentId="2" preFractionAlong="0.0" postCellId="../pop_ngf/0/ngfcell" postSegmentId="10" postFractionAlong="9.21045047064e-06" weight="1." delay="3ms"/>
            <connectionWD id="1" preCellId="../pop_olm/0/olmcell" preSegmentId="2" preFractionAlong="0.0" postCellId="../pop_ngf/0/ngfcell" postSegmentId="17" postFractionAlong="0.999997468791" weight="1." delay="3ms"/>
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        </projection>
        <projection id="proj_cckpop_to_poolosynpop" presynapticPopulation="pop_cck" postsynapticPopulation="pop_poolosyn" synapse="syn_cck_to_poolosyn">
            <connectionWD id="0" preCellId="../pop_cck/0/cckcell" preSegmentId="2" preFractionAlong="0.0" postCellId="../pop_poolosyn/10/poolosyncell" postSegmentId="503" postFractionAlong="0.0" weight="1." delay="3ms"/>
            <connectionWD id="1" preCellId="../pop_cck/0/cckcell" preSegmentId="2" preFractionAlong="0.0" postCellId="../pop_poolosyn/10/poolosyncell" postSegmentId="573" postFractionAlong="2.67386012739e-07" weight="1." delay="3ms"/>
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        </projection>
        <projection id="proj_olmpop_to_scapop" presynapticPopulation="pop_olm" postsynapticPopulation="pop_sca" synapse="syn_olm_to_sca">
            <connectionWD id="0" preCellId="../pop_olm/0/olmcell" preSegmentId="2" preFractionAlong="0.0" postCellId="../pop_sca/0/scacell" postSegmentId="20" postFractionAlong="9.21045047064e-06" weight="1." delay="3ms"/>
            <connectionWD id="1" preCellId="../pop_olm/0/olmcell" preSegmentId="2" preFractionAlong="0.0" postCellId="../pop_sca/0/scacell" postSegmentId="10" postFractionAlong="9.21045047064e-06" weight="1." delay="3ms"/>
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        </projection>
        <projection id="proj_bistratifiedpop_to_ivypop" presynapticPopulation="pop_bistratified" postsynapticPopulation="pop_ivy" synapse="syn_bistratified_to_ivy">
            <connectionWD id="0" preCellId="../pop_bistratified/0/bistratifiedcell" preSegmentId="2" preFractionAlong="0.0" postCellId="../pop_ivy/0/ivycell" postSegmentId="30" postFractionAlong="1.31047759686e-06" weight="1." delay="3ms"/>
            <connectionWD id="1" preCellId="../pop_bistratified/0/bistratifiedcell" preSegmentId="2" preFractionAlong="0.0" postCellId="../pop_ivy/0/ivycell" postSegmentId="15" postFractionAlong="0.999999610581" weight="1." delay="3ms"/>
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        </projection>
        <projection id="proj_cckpop_to_olmpop" presynapticPopulation="pop_cck" postsynapticPopulation="pop_olm" synapse="syn_cck_to_olm">
            <connectionWD id="0" preCellId="../pop_cck/0/cckcell" preSegmentId="2" preFractionAlong="0.0" postCellId="../pop_olm/0/olmcell" postSegmentId="2" postFractionAlong="0.0" weight="1." delay="3ms"/>
            <connectionWD id="1" preCellId="../pop_cck/0/cckcell" preSegmentId="2" preFractionAlong="0.0" postCellId="../pop_olm/0/olmcell" postSegmentId="2" postFractionAlong="0.0" weight="1." delay="3ms"/>
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        </projection>
        <projection id="proj_ca3pop_to_bistratifiedpop" presynapticPopulation="pop_ca3" postsynapticPopulation="pop_bistratified" synapse="syn_ca3_to_bistratified">
            <connectionWD id="0" preCellId="../pop_ca3/6/spikeGenPoisson" preSegmentId="0" preFractionAlong="0.5" postCellId="../pop_bistratified/0/bistratifiedcell" postSegmentId="5" postFractionAlong="0.999999610581" weight="1." delay="3ms"/>
            <connectionWD id="1" preCellId="../pop_ca3/6/spikeGenPoisson" preSegmentId="0" preFractionAlong="0.5" postCellId="../pop_bistratified/0/bistratifiedcell" postSegmentId="15" postFractionAlong="0.999999610581" weight="1." delay="3ms"/>
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        </projection>
        <projection id="proj_ngfpop_to_ngfpop_A" presynapticPopulation="pop_ngf" postsynapticPopulation="pop_ngf" synapse="syn_ngf_to_ngf_A">
            <connectionWD id="0" preCellId="../pop_ngf/0/ngfcell" preSegmentId="2" preFractionAlong="0.0" postCellId="../pop_ngf/0/ngfcell" postSegmentId="12" postFractionAlong="5.68434342085e-16" weight="1." delay="3ms"/>
            <connectionWD id="1" preCellId="../pop_ngf/0/ngfcell" preSegmentId="2" preFractionAlong="0.0" postCellId="../pop_ngf/0/ngfcell" postSegmentId="17" postFractionAlong="0.999997468791" weight="1." delay="3ms"/>
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        </projection>
        <projection id="proj_ngfpop_to_ngfpop_B" presynapticPopulation="pop_ngf" postsynapticPopulation="pop_ngf" synapse="syn_ngf_to_ngf_B">
            <connectionWD id="0" preCellId="../pop_ngf/0/ngfcell" preSegmentId="2" preFractionAlong="0.0" postCellId="../pop_ngf/0/ngfcell" postSegmentId="12" postFractionAlong="5.68434342085e-16" weight="1." delay="3ms"/>
            <connectionWD id="1" preCellId="../pop_ngf/0/ngfcell" preSegmentId="2" preFractionAlong="0.0" postCellId="../pop_ngf/0/ngfcell" postSegmentId="17" postFractionAlong="0.999997468791" weight="1." delay="3ms"/>
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        </projection>
        <projection id="proj_cckpop_to_axoaxonicpop" presynapticPopulation="pop_cck" postsynapticPopulation="pop_axoaxonic" synapse="syn_cck_to_axoaxonic">
            <connectionWD id="0" preCellId="../pop_cck/0/cckcell" preSegmentId="2" preFractionAlong="0.0" postCellId="../pop_axoaxonic/0/axoaxoniccell" postSegmentId="23" postFractionAlong="0.99999907894" weight="1." delay="3ms"/>
            <connectionWD id="1" preCellId="../pop_cck/0/cckcell" preSegmentId="2" preFractionAlong="0.0" postCellId="../pop_axoaxonic/0/axoaxoniccell" postSegmentId="23" postFractionAlong="0.99999907894" weight="1." delay="3ms"/>
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        </projection>
        <projection id="proj_pvbasketpop_to_cckpop" presynapticPopulation="pop_pvbasket" postsynapticPopulation="pop_cck" synapse="syn_pvbasket_to_cck">
            <connectionWD id="0" preCellId="../pop_pvbasket/0/pvbasketcell" preSegmentId="2" preFractionAlong="0.0" postCellId="../pop_cck/0/cckcell" postSegmentId="2" postFractionAlong="0.0" weight="1." delay="3ms"/>
        </projection>
        <projection id="proj_ca3pop_to_axoaxonicpop" presynapticPopulation="pop_ca3" postsynapticPopulation="pop_axoaxonic" synapse="syn_ca3_to_axoaxonic">
            <connectionWD id="0" preCellId="../pop_ca3/9/spikeGenPoisson" preSegmentId="0" preFractionAlong="0.5" postCellId="../pop_axoaxonic/0/axoaxoniccell" postSegmentId="5" postFractionAlong="0.999999610581" weight="1." delay="3ms"/>
            <connectionWD id="1" preCellId="../pop_ca3/9/spikeGenPoisson" preSegmentId="0" preFractionAlong="0.5" postCellId="../pop_axoaxonic/0/axoaxoniccell" postSegmentId="30" postFractionAlong="1.31047759686e-06" weight="1." delay="3ms"/>
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        </projection>
        <projection id="proj_scapop_to_axoaxonicpop" presynapticPopulation="pop_sca" postsynapticPopulation="pop_axoaxonic" synapse="syn_sca_to_axoaxonic">
            <connectionWD id="0" preCellId="../pop_sca/0/scacell" preSegmentId="2" preFractionAlong="0.0" postCellId="../pop_axoaxonic/0/axoaxoniccell" postSegmentId="26" postFractionAlong="5.3164139797e-07" weight="1." delay="3ms"/>
            <connectionWD id="1" preCellId="../pop_sca/0/scacell" preSegmentId="2" preFractionAlong="0.0" postCellId="../pop_axoaxonic/0/axoaxoniccell" postSegmentId="30" postFractionAlong="1.31047759686e-06" weight="1." delay="3ms"/>
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        </projection>
        <projection id="proj_cckpop_to_scapop" presynapticPopulation="pop_cck" postsynapticPopulation="pop_sca" synapse="syn_cck_to_sca">
            <connectionWD id="0" preCellId="../pop_cck/0/cckcell" preSegmentId="2" preFractionAlong="0.0" postCellId="../pop_sca/0/scacell" postSegmentId="23" postFractionAlong="0.99999907894" weight="1." delay="3ms"/>
            <connectionWD id="1" preCellId="../pop_cck/0/cckcell" preSegmentId="2" preFractionAlong="0.0" postCellId="../pop_sca/0/scacell" postSegmentId="4" postFractionAlong="0.0" weight="1." delay="3ms"/>
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        </projection>
        <projection id="proj_olmpop_to_pvbasketpop" presynapticPopulation="pop_olm" postsynapticPopulation="pop_pvbasket" synapse="syn_olm_to_pvbasket">
            <connectionWD id="0" preCellId="../pop_olm/0/olmcell" preSegmentId="2" preFractionAlong="0.0" postCellId="../pop_pvbasket/0/pvbasketcell" postSegmentId="12" postFractionAlong="5.68434342085e-16" weight="1." delay="3ms"/>
            <connectionWD id="1" preCellId="../pop_olm/0/olmcell" preSegmentId="2" preFractionAlong="0.0" postCellId="../pop_pvbasket/0/pvbasketcell" postSegmentId="20" postFractionAlong="9.21045047064e-06" weight="1." delay="3ms"/>
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        </projection>
        <projection id="proj_scapop_to_poolosynpop" presynapticPopulation="pop_sca" postsynapticPopulation="pop_poolosyn" synapse="syn_sca_to_poolosyn">
            <connectionWD id="0" preCellId="../pop_sca/0/scacell" preSegmentId="2" preFractionAlong="0.0" postCellId="../pop_poolosyn/10/poolosyncell" postSegmentId="473" postFractionAlong="3.65222782353e-11" weight="1." delay="3ms"/>
            <connectionWD id="1" preCellId="../pop_sca/0/scacell" preSegmentId="2" preFractionAlong="0.0" postCellId="../pop_poolosyn/10/poolosyncell" postSegmentId="535" postFractionAlong="0.999993316268" weight="1." delay="3ms"/>
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        </projection>
        <projection id="proj_scapop_to_ivypop" presynapticPopulation="pop_sca" postsynapticPopulation="pop_ivy" synapse="syn_sca_to_ivy">
            <connectionWD id="0" preCellId="../pop_sca/0/scacell" preSegmentId="2" preFractionAlong="0.0" postCellId="../pop_ivy/0/ivycell" postSegmentId="26" postFractionAlong="5.3164139797e-07" weight="1." delay="3ms"/>
            <connectionWD id="1" preCellId="../pop_sca/0/scacell" preSegmentId="2" preFractionAlong="0.0" postCellId="../pop_ivy/0/ivycell" postSegmentId="26" postFractionAlong="5.3164139797e-07" weight="1." delay="3ms"/>
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        </projection>
        <projection id="proj_ecpop_to_poolosynpop" presynapticPopulation="pop_ec" postsynapticPopulation="pop_poolosyn" synapse="syn_ec_to_poolosyn">
            <connectionWD id="0" preCellId="../pop_ec/1/spikeGenPoisson" preSegmentId="0" preFractionAlong="0.5" postCellId="../pop_poolosyn/0/poolosyncell" postSegmentId="321" weight="1." delay="3ms"/>
            <connectionWD id="1" preCellId="../pop_ec/1/spikeGenPoisson" preSegmentId="0" preFractionAlong="0.5" postCellId="../pop_poolosyn/0/poolosyncell" postSegmentId="415" postFractionAlong="0.500002578471" weight="1." delay="3ms"/>
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        </projection>
        <projection id="proj_scapop_to_olmpop" presynapticPopulation="pop_sca" postsynapticPopulation="pop_olm" synapse="syn_sca_to_olm">
            <connectionWD id="0" preCellId="../pop_sca/0/scacell" preSegmentId="2" preFractionAlong="0.0" postCellId="../pop_olm/0/olmcell" postSegmentId="3" postFractionAlong="0.885" weight="1." delay="3ms"/>
            <connectionWD id="1" preCellId="../pop_sca/0/scacell" preSegmentId="2" preFractionAlong="0.0" postCellId="../pop_olm/0/olmcell" postSegmentId="3" postFractionAlong="0.885" weight="1." delay="3ms"/>
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        </projection>
        <projection id="proj_poolosynpop_to_poolosynpop" presynapticPopulation="pop_poolosyn" postsynapticPopulation="pop_poolosyn" synapse="syn_poolosyn_to_poolosyn">
            <connectionWD id="0" preCellId="../pop_poolosyn/0/poolosyncell" preSegmentId="2" preFractionAlong="0.0" postCellId="../pop_poolosyn/0/poolosyncell" postSegmentId="422" postFractionAlong="0.999999217919" weight="1." delay="3ms"/>
            <connectionWD id="1" preCellId="../pop_poolosyn/1/poolosyncell" preSegmentId="2" preFractionAlong="0.0" postCellId="../pop_poolosyn/0/poolosyncell" postSegmentId="473" postFractionAlong="3.65222782353e-11" weight="1." delay="3ms"/>
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        </projection>
        <projection id="proj_bistratifiedpop_to_scapop" presynapticPopulation="pop_bistratified" postsynapticPopulation="pop_sca" synapse="syn_bistratified_to_sca">
            <connectionWD id="0" preCellId="../pop_bistratified/0/bistratifiedcell" preSegmentId="2" preFractionAlong="0.0" postCellId="../pop_sca/0/scacell" postSegmentId="30" postFractionAlong="1.31047759686e-06" weight="1." delay="3ms"/>
            <connectionWD id="1" preCellId="../pop_bistratified/0/bistratifiedcell" preSegmentId="2" preFractionAlong="0.0" postCellId="../pop_sca/0/scacell" postSegmentId="5" postFractionAlong="0.999999610581" weight="1." delay="3ms"/>
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        </projection>
        <projection id="proj_ecpop_to_bistratifiedpop" presynapticPopulation="pop_ec" postsynapticPopulation="pop_bistratified" synapse="syn_ec_to_bistratified">
            <connectionWD id="0" preCellId="../pop_ec/16/spikeGenPoisson" preSegmentId="0" preFractionAlong="0.5" postCellId="../pop_bistratified/0/bistratifiedcell" postSegmentId="22" postFractionAlong="5.68434342085e-16" weight="1." delay="3ms"/>
            <connectionWD id="1" preCellId="../pop_ec/16/spikeGenPoisson" preSegmentId="0" preFractionAlong="0.5" postCellId="../pop_bistratified/0/bistratifiedcell" postSegmentId="34" postFractionAlong="1.94710771066e-06" weight="1." delay="3ms"/>
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        </projection>
        <projection id="proj_bistratifiedpop_to_bistratifiedpop" presynapticPopulation="pop_bistratified" postsynapticPopulation="pop_bistratified" synapse="syn_bistratified_to_bistratified">
            <connectionWD id="0" preCellId="../pop_bistratified/0/bistratifiedcell" preSegmentId="2" preFractionAlong="0.0" postCellId="../pop_bistratified/0/bistratifiedcell" postSegmentId="5" postFractionAlong="0.999999610581" weight="1." delay="3ms"/>
            <connectionWD id="1" preCellId="../pop_bistratified/0/bistratifiedcell" preSegmentId="2" preFractionAlong="0.0" postCellId="../pop_bistratified/0/bistratifiedcell" postSegmentId="26" postFractionAlong="5.3164139797e-07" weight="1." delay="3ms"/>
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        </projection>
        <projection id="proj_ivypop_to_bistratifiedpop" presynapticPopulation="pop_ivy" postsynapticPopulation="pop_bistratified" synapse="syn_ivy_to_bistratified">
            <connectionWD id="0" preCellId="../pop_ivy/0/ivycell" preSegmentId="2" preFractionAlong="0.0" postCellId="../pop_bistratified/0/bistratifiedcell" postSegmentId="23" postFractionAlong="0.99999907894" weight="1." delay="3ms"/>
            <connectionWD id="1" preCellId="../pop_ivy/0/ivycell" preSegmentId="2" preFractionAlong="0.0" postCellId="../pop_bistratified/0/bistratifiedcell" postSegmentId="26" postFractionAlong="5.3164139797e-07" weight="1." delay="3ms"/>
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        </projection>
        <projection id="proj_ca3pop_to_cckpop" presynapticPopulation="pop_ca3" postsynapticPopulation="pop_cck" synapse="syn_ca3_to_cck">
            <connectionWD id="0" preCellId="../pop_ca3/10/spikeGenPoisson" preSegmentId="0" preFractionAlong="0.5" postCellId="../pop_cck/0/cckcell" postSegmentId="4" postFractionAlong="0.0" weight="1." delay="3ms"/>
            <connectionWD id="1" preCellId="../pop_ca3/10/spikeGenPoisson" preSegmentId="0" preFractionAlong="0.5" postCellId="../pop_cck/0/cckcell" postSegmentId="30" postFractionAlong="1.31047759686e-06" weight="1." delay="3ms"/>
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        </projection>
        <projection id="proj_olmpop_to_poolosynpop" presynapticPopulation="pop_olm" postsynapticPopulation="pop_poolosyn" synapse="syn_olm_to_poolosyn">
            <connectionWD id="0" preCellId="../pop_olm/0/olmcell" preSegmentId="2" preFractionAlong="0.0" postCellId="../pop_poolosyn/10/poolosyncell" postSegmentId="241" postFractionAlong="0.500006200538" weight="1." delay="3ms"/>
            <connectionWD id="1" preCellId="../pop_olm/0/olmcell" preSegmentId="2" preFractionAlong="0.0" postCellId="../pop_poolosyn/10/poolosyncell" postSegmentId="291" postFractionAlong="0.499998200037" weight="1." delay="3ms"/>
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        </projection>
        <projection id="proj_pvbasketpop_to_ivypop" presynapticPopulation="pop_pvbasket" postsynapticPopulation="pop_ivy" synapse="syn_pvbasket_to_ivy">
            <connectionWD id="0" preCellId="../pop_pvbasket/0/pvbasketcell" preSegmentId="2" preFractionAlong="0.0" postCellId="../pop_ivy/0/ivycell" postSegmentId="2" postFractionAlong="0.0" weight="1." delay="3ms"/>
        </projection>
        <projection id="proj_poolosynpop_to_pvbasketpop" presynapticPopulation="pop_poolosyn" postsynapticPopulation="pop_pvbasket" synapse="syn_poolosyn_to_pvbasket">
            <connectionWD id="0" preCellId="../pop_poolosyn/17/poolosyncell" preSegmentId="2" preFractionAlong="0.0" postCellId="../pop_pvbasket/0/pvbasketcell" postSegmentId="22" postFractionAlong="5.68434342085e-16" weight="1." delay="3ms"/>
            <connectionWD id="1" preCellId="../pop_poolosyn/17/poolosyncell" preSegmentId="2" preFractionAlong="0.0" postCellId="../pop_pvbasket/0/pvbasketcell" postSegmentId="22" postFractionAlong="5.68434342085e-16" weight="1." delay="3ms"/>
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        </projection>
        <projection id="proj_scapop_to_bistratifiedpop" presynapticPopulation="pop_sca" postsynapticPopulation="pop_bistratified" synapse="syn_sca_to_bistratified">
            <connectionWD id="0" preCellId="../pop_sca/0/scacell" preSegmentId="2" preFractionAlong="0.0" postCellId="../pop_bistratified/0/bistratifiedcell" postSegmentId="4" postFractionAlong="0.0" weight="1." delay="3ms"/>
            <connectionWD id="1" preCellId="../pop_sca/0/scacell" preSegmentId="2" preFractionAlong="0.0" postCellId="../pop_bistratified/0/bistratifiedcell" postSegmentId="32" postFractionAlong="9.21061780579e-07" weight="1." delay="3ms"/>
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        </projection>
        <projection id="proj_ivypop_to_pvbasketpop" presynapticPopulation="pop_ivy" postsynapticPopulation="pop_pvbasket" synapse="syn_ivy_to_pvbasket">
            <connectionWD id="0" preCellId="../pop_ivy/0/ivycell" preSegmentId="2" preFractionAlong="0.0" postCellId="../pop_pvbasket/0/pvbasketcell" postSegmentId="5" postFractionAlong="0.999999610581" weight="1." delay="3ms"/>
            <connectionWD id="1" preCellId="../pop_ivy/0/ivycell" preSegmentId="2" preFractionAlong="0.0" postCellId="../pop_pvbasket/0/pvbasketcell" postSegmentId="32" postFractionAlong="9.21061780579e-07" weight="1." delay="3ms"/>
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        </projection>
        <projection id="proj_poolosynpop_to_olmpop" presynapticPopulation="pop_poolosyn" postsynapticPopulation="pop_olm" synapse="syn_poolosyn_to_olm">
            <connectionWD id="0" preCellId="../pop_poolosyn/17/poolosyncell" preSegmentId="2" preFractionAlong="0.0" postCellId="../pop_olm/0/olmcell" postSegmentId="3" postFractionAlong="0.885" weight="1." delay="3ms"/>
            <connectionWD id="1" preCellId="../pop_poolosyn/17/poolosyncell" preSegmentId="2" preFractionAlong="0.0" postCellId="../pop_olm/0/olmcell" postSegmentId="3" postFractionAlong="0.885" weight="1." delay="3ms"/>
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        </projection>
        <inputList id="input_vc_ngf" population="pop_ngf" component="vc_ngf">
            <input id="0" target="../pop_ngf/0/ngfcell" destination="synapses"/>
        </inputList>
        <inputList id="input_vc_bistratified" population="pop_bistratified" component="vc_bistratified">
            <input id="0" target="../pop_bistratified/0/bistratifiedcell" destination="synapses"/>
        </inputList>
        <inputList id="input_vc_sca" population="pop_sca" component="vc_sca">
            <input id="0" target="../pop_sca/0/scacell" destination="synapses"/>
        </inputList>
        <inputList id="input_vc_olm" population="pop_olm" component="vc_olm">
            <input id="0" target="../pop_olm/0/olmcell" destination="synapses"/>
        </inputList>
        <inputList id="input_vc_ivy" population="pop_ivy" component="vc_ivy">
            <input id="0" target="../pop_ivy/0/ivycell" destination="synapses"/>
        </inputList>
        <inputList id="input_vc_pvbasket" population="pop_pvbasket" component="vc_pvbasket">
            <input id="0" target="../pop_pvbasket/0/pvbasketcell" destination="synapses"/>
        </inputList>
        <inputList id="input_vc_cck" population="pop_cck" component="vc_cck">
            <input id="0" target="../pop_cck/0/cckcell" destination="synapses"/>
        </inputList>
        <inputList id="input_vc_axoaxonic" population="pop_axoaxonic" component="vc_axoaxonic">
            <input id="0" target="../pop_axoaxonic/0/axoaxoniccell" destination="synapses"/>
        </inputList>
        <inputList id="input_vc_poolosyn" population="pop_poolosyn" component="vc_poolosyn">
            <input id="0" target="../pop_poolosyn/0/poolosyncell" destination="synapses"/>
            <input id="1" target="../pop_poolosyn/1/poolosyncell" destination="synapses"/>
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        </inputList>
    </network>
</neuroml>
